# OpenSim document version 30000
MarkerSet:
  Marker STRN: torso (0.106084 0.210416 -0.000902903)
  Marker RSHO: torso (-0.00568081 0.424311 0.158791)
  Marker LSHO: torso (-0.00567403 0.420175 -0.163018)
  Marker RASI: pelvis (0.00953047 0.0180816 0.128464)
  Marker LASI: pelvis (0.00953047 0.0180816 -0.128464)
  Marker RTHI: femur_r (0.0116805 -0.208788 0.0852882)
  Marker RKNE: femur_r (0 -0.404 0.05)
  Marker RTIB: tibia_r (-0.00416415 -0.255457 0.0675954)
  Marker RANK: tibia_r (-0.00638793 -0.410577 0.0552432)
  Marker RHEE: calcn_r (-0.016913 0.0269821 -0.00305317)
  Marker RTOE: calcn_r (0.18 0.024 0.001)
  Marker LTHI: femur_l (0.0116805 -0.208788 -0.0852882)
  Marker LKNE: femur_l (0 -0.404 -0.05)
  Marker LTIB: tibia_l (-0.00416415 -0.255457 -0.0675954)
  Marker LANK: tibia_l (-0.00510879 -0.406949 -0.053891)
  Marker LHEE: calcn_l (-0.0203305 0.0265281 0.00140895)
  Marker LTOE: calcn_l (0.18 0.024 0.001)
  Marker CLAV: torso (0.0292503 0.378783 -0.00390858)
  Marker C7: torso (-0.0735113 0.435349 -0.000983694)
  Marker T10: torso (-0.0994865 0.201825 -0.00241133)
  Marker RPSI: pelvis (-0.155 0.035 0.045)
  Marker LPSI: pelvis (-0.155 0.035 -0.045)
  Marker RHJC: femur_r (0 0 0)
  Marker LHJC: femur_l (0 0 0)
  Marker RKJC: tibia_r (0 0 0)
  Marker LKJC: tibia_l (0 0 0)
  Marker RAJC: talus_r (0 0 0)
  Marker LAJC: talus_l (0 0 0)
  Marker RKNI: femur_r (0.00162731 -0.405619 -0.0517447)
  Marker LKNI: femur_l (0.00162731 -0.405619 0.0517447)
  Marker RMED: tibia_r (5.99471e-5 -0.389126 -0.03973)
  Marker LMED: tibia_l (5.99471e-5 -0.389126 0.03973)
  Marker RTAD: femur_r (0.0578953 -0.273073 0.00498275)
  Marker RTHAP: femur_r (0.0627736 -0.144793 0.00686325)
  Marker LTAD: femur_l (0.0578953 -0.273073 -0.00498275)
  Marker LTHAP: femur_l (0.0627736 -0.144793 -0.00686325)
  Marker RTIAD: tibia_r (0.0466653 -0.258413 0.00491395)
  Marker RTTU: tibia_r (0.0477707 -0.0867172 -0.00372945)
  Marker LTIAD: tibia_l (0.0466653 -0.258413 -0.00491395)
  Marker LTTU: tibia_l (0.0477707 -0.0867172 0.00372945)
