# OpenSim document version 30000
ScaleTool model_scaled:
  mass: 41 [kg]
  height: 1540
  age: 12
  notes: male
  GenericModelMaker:
    model_file: ../model/model_generic.osim
    marker_set_file: markers.xml
  ModelScaler:
    apply: true
    scaling_order: measurements manualScale
    marker_file: ../experimental_data/static.trc
    time_range: 0 10
    preserve_mass_distribution: true
    output_model_file: model_scaled.osim
    output_scale_file: model_scale_set_applied.xml
    MeasurementSet:
      Measurement thigh_r: apply=true
        MarkerPair: markers=(RPSI RKNI)
        MarkerPair: markers=(RASI RKNE)
        BodyScale femur_r: axes=(X Y Z)
      Measurement thigh_l: apply=true
        MarkerPair: markers=(LPSI LKNI)
        MarkerPair: markers=(LASI LKNE)
        BodyScale femur_l: axes=(X Y Z)
      Measurement shank_r: apply=true
        MarkerPair: markers=(RKNI RMED)
        MarkerPair: markers=(RKNE RANK)
        BodyScale tibia_r: axes=(X Y Z)
      Measurement shank_l: apply=true
        MarkerPair: markers=(LKNI LMED)
        MarkerPair: markers=(LKNE LANK)
        BodyScale tibia_l: axes=(X Y Z)
      Measurement foot_r: apply=true
        MarkerPair: markers=(RHEE RTOE)
        BodyScale talus_r: axes=(X Y Z)
        BodyScale calcn_r: axes=(X Y Z)
        BodyScale toes_r: axes=(X Y Z)
      Measurement foot_l: apply=true
        MarkerPair: markers=(LHEE LTOE)
        BodyScale talus_l: axes=(X Y Z)
        BodyScale calcn_l: axes=(X Y Z)
        BodyScale toes_l: axes=(X Y Z)
      Measurement pelvis_z: apply=false
        MarkerPair: markers=(RPSI LPSI)
        MarkerPair: markers=(RASI LASI)
      Measurement torso_x: apply=true
        MarkerPair: markers=(STRN T10)
        BodyScale torso: axes=X
      Measurement torso_y: apply=true
        MarkerPair: markers=(LPSI RSHO)
        MarkerPair: markers=(RPSI RSHO)
        MarkerPair: markers=(LASI LSHO)
        MarkerPair: markers=(RASI RSHO)
        BodyScale torso: axes=Y
      Measurement torso_z: apply=true
        MarkerPair: markers=(RSHO LSHO)
        BodyScale pelvis: axes=Z
        BodyScale torso: axes=Z
      Measurement pelvis_x: apply=true
        MarkerPair: markers=(LASI LPSI)
        MarkerPair: markers=(RASI RPSI)
        BodyScale pelvis: axes=(X Y)
    ScaleSet:
      Scale: scales=(0.9 0.9 0.9) segment=pelvis apply=false
  MarkerPlacer:
    apply: true
    marker_file: ../experimental_data/static.trc
    time_range: 0 10
    output_motion_file: static.mot
    output_model_file: model_scaled.osim
    output_marker_file: model_markers.osim
    max_marker_movement: -1
    IKTaskSet:
      IKMarkerTask STRN: apply=true weight=1
      IKMarkerTask RSHO: apply=true weight=5
      IKMarkerTask LSHO: apply=true weight=5
      IKMarkerTask RASI: apply=true weight=2
      IKMarkerTask LASI: apply=true weight=2
      IKMarkerTask RTHI: apply=true weight=0.5
      IKMarkerTask RKNE: apply=true weight=2
      IKMarkerTask RTIB: apply=true weight=0.5
      IKMarkerTask RANK: apply=true weight=5
      IKMarkerTask RHEE: apply=true weight=1
      IKMarkerTask RTOE: apply=true weight=1
      IKMarkerTask LTHI: apply=true weight=0.5
      IKMarkerTask LKNE: apply=true weight=2
      IKMarkerTask LTIB: apply=true weight=0.5
      IKMarkerTask LANK: apply=true weight=5
      IKMarkerTask LHEE: apply=true weight=1
      IKMarkerTask LTOE: apply=true weight=1
      IKMarkerTask CLAV: apply=true weight=1
      IKMarkerTask C7: apply=true weight=1
      IKMarkerTask T10: apply=true weight=1
      IKMarkerTask RPSI: apply=true weight=0.5
      IKMarkerTask LPSI: apply=true weight=0.5
      IKMarkerTask RHJC: apply=false weight=6
      IKMarkerTask LHJC: apply=false weight=6
      IKMarkerTask RKJC: apply=false weight=6
      IKMarkerTask LKJC: apply=false weight=6
      IKMarkerTask RAJC: apply=false weight=6
      IKMarkerTask LAJC: apply=false weight=6
      IKMarkerTask RKNI: apply=true weight=2
      IKMarkerTask LKNI: apply=true weight=2
      IKMarkerTask RMED: apply=true weight=5
      IKMarkerTask LMED: apply=true weight=5
      IKMarkerTask RTAD: apply=true weight=0.5
      IKMarkerTask RTHAP: apply=true weight=0.5
      IKMarkerTask LTAD: apply=true weight=0.5
      IKMarkerTask LTHAP: apply=true weight=0.5
      IKMarkerTask RTIAD: apply=true weight=0.5
      IKMarkerTask RTTU: apply=true weight=2
      IKMarkerTask LTIAD: apply=true weight=0.5
      IKMarkerTask LTTU: apply=true weight=2
