# OpenSim document version 30000
Model model_scaled:
  length_units: meters
  force_units: N
  gravity: 0 -9.80665 0
  credits:
    A reduced 3D gait model with 14 degrees of freedom and 22 muscles (based on planar gait9dof18 by Ajay Seth). Adjusted by Carmichael Ong to follow muscle strengths of Handsfield/Rajagopal and changed hamstrings to follow semimembranosus and to adjust passive curves of hamstrings, rect_fem, and vasti. Closely based on Delp S.L., Loan J.P., Hoy M.G., Zajac F.E., Topp E.L., Rosen J.M., Thelen D.G., Anderson F.C., Seth A. Notes: 3D, 23 DOF gait model created by D.G. Thelen, Univ. of Wisconsin-Madison, and Ajay Seth, Frank C. Anderson, and Scott L. Delp, Stanford University. Lower extremity joint defintions based on Delp et al. (1990). Low back joint and anthropometry based on Anderson and Pandy (1999, 2001). Planar knee model of Yamaguchi and Zajac (1989). Seth replaced tibia translation constraints with a CustomJoint for the knee and removed the patella to eliminate all kinematic constraints; insertions of the quadrucepts are handled with moving points in the tibia frame as defined by Delp 1990. Number of muscles was reduced by Anderson to improve simulation speed for demonstrations and is not intended to be used in research. License: Creative Commons (CCBY 3.0). You are free to distribute, remix, tweak, and build upon this work, even commercially, as long as you credit us for the original creation. http://creativecommons.org/licenses/by/3.0/ More Information: http://simtk-confluence.stanford.edu:8080/display/OpenSim/Gait+2392+and+2354+Models
  publications:
    Delp, S.L., Loan, J.P., Hoy, M.G., Zajac, F.E., Topp E.L., Rosen, J.M.: An interactive graphics-based model of the lower extremity to study orthopaedic surgical procedures, IEEE Transactions on Biomedical Engineering, vol. 37, pp. 757-767, 1990. Yamaguchi G.T., Zajac F.E.: A planar model of the knee joint to characterize the knee extensor mechanism." J . Biomech. vol. 22. pp. 1-10. 1989. Anderson F.C., Pandy M.G.: A dynamic optimization solution for vertical jumping in three dimensions. Computer Methods in Biomechanics and Biomedical Engineering 2:201-231, 1999. Anderson F.C., Pandy M.G.: Dynamic optimization of human walking. Journal of Biomechanical Engineering 123:381-390, 2001.
  BodySet:
    Body ground: mass=0 mass_center=(0 0 0) inertia_xx=0 inertia_yy=0 inertia_zz=0
    Body pelvis: mass=5.483898 mass_center=(-0.0588248 0 0) inertia_xx=0.0362254 inertia_yy=0.0362254
        inertia_zz=0.01965437 meshes=(sacrum.vtp pelvis.vtp l_pelvis.vtp)
      CustomJoint ground_pelvis: parent_body=ground location_in_parent=(0 0 0) location=(0 0 0)
        Coordinate pelvis_tilt: motion_type=rotational default_value=0 range=(-1.570796 1.570796) clamped=false
        Coordinate pelvis_list: motion_type=rotational default_value=0 range=(-1.570796 1.570796) clamped=false
        Coordinate pelvis_rotation: motion_type=rotational default_value=0 range=(-1.570796 1.570796) clamped=false
        Coordinate pelvis_tx: motion_type=translational default_value=0 range=(-5 5) clamped=false
        Coordinate pelvis_ty: motion_type=translational default_value=0.94 range=(-1 2) clamped=false
        Coordinate pelvis_tz: motion_type=translational default_value=0 range=(-3 3) clamped=false
        SpatialTransform:
          TransformAxis rotation1: coordinates=pelvis_tilt axis=(0 0 1) LinearFunction(coefficients=1 0)
          TransformAxis rotation2: coordinates=pelvis_list axis=(1 0 0) LinearFunction(coefficients=1 0)
          TransformAxis rotation3: coordinates=pelvis_rotation axis=(0 1 0) LinearFunction(coefficients=1 0)
          TransformAxis translation1: coordinates=pelvis_tx axis=(1 0 0) LinearFunction(coefficients=1 0)
          TransformAxis translation2: coordinates=pelvis_ty axis=(0 1 0) LinearFunction(coefficients=1 0)
          TransformAxis translation3: coordinates=pelvis_tz axis=(0 0 1) LinearFunction(coefficients=1 0)
    Body femur_r: mass=4.331148 mass_center=(0 -0.144523 0) inertia_xx=0.04506208 inertia_yy=0.01181239
        inertia_zz=0.04751878 meshes=femur.vtp
      CustomJoint hip_r: parent_body=pelvis location_in_parent=(-0.05882482 -0.05791435 0.07315958) location=(0 0 0)
        Coordinate hip_flexion_r: motion_type=rotational default_value=0 range=(-2.094395 2.094395) clamped=false
        Coordinate hip_adduction_r: motion_type=rotational default_value=0 range=(-2.094395 2.094395) clamped=false
        Coordinate hip_rotation_r: motion_type=rotational default_value=0 range=(-2.094395 2.094395) clamped=false
            locked=true
        SpatialTransform: axes_held_at_zero=(translation1 translation2 translation3)
          TransformAxis rotation1: coordinates=hip_flexion_r axis=(0 0 1) LinearFunction(coefficients=1 0)
          TransformAxis rotation2: coordinates=hip_adduction_r axis=(1 0 0) LinearFunction(coefficients=1 0)
          TransformAxis rotation3: coordinates=hip_rotation_r axis=(0 1 0) LinearFunction(coefficients=1 0)
    Body tibia_r: mass=1.726378 mass_center=(0 -0.174431 0) inertia_xx=0.0204853 inertia_yy=0.002072917
        inertia_zz=0.02076982 meshes=(tibia.vtp fibula.vtp)
      CustomJoint knee_r: parent_body=femur_r location_in_parent=(0 0 0) location=(0 0 0)
        Coordinate knee_angle_r: motion_type=rotational default_value=0 range=(-2.094395 0.1745329) clamped=false
        SpatialTransform: axes_held_at_zero=(rotation2 rotation3 translation3)
          TransformAxis rotation1: coordinates=knee_angle_r axis=(0 0 1) LinearFunction(coefficients=1 0)
          TransformAxis translation1: coordinates=knee_angle_r axis=(1 0 0)
            MultiplierFunction: scale=0.8501351
              SimmSpline: x=(-2.0944 -1.74533 -1.39626 -1.0472 -0.698132 -0.349066 -0.174533 0.197344 0.337395 0.490178 1.52146 2.0944)
                  y=(-0.0032 0.00179 0.00411 0.0041 0.00212 -0.001 -0.0031 -0.005227 -0.005435 -0.005574 -0.005435 -0.00525)
          TransformAxis translation2: coordinates=knee_angle_r axis=(0 1 0)
            MultiplierFunction: scale=0.8501351
              SimmSpline: x=(-2.0944 -1.22173 -0.523599 -0.349066 -0.174533 0.159149 2.0944)
                  y=(-0.4226 -0.4082 -0.399 -0.3976 -0.3966 -0.395264 -0.396)
    Body talus_r: mass=0.04656447 mass_center=(0 0 0) inertia_xx=0.0003330272 inertia_yy=0.0003330272
        inertia_zz=0.0003330272 meshes=talus.vtp
      PinJoint ankle_r: parent_body=tibia_r location_in_parent=(0 -0.4017418 0) location=(0 0 0)
        Coordinate ankle_angle_r: motion_type=rotational default_value=0 range=(-1.570796 1.570796) clamped=false
    Body calcn_r: mass=0.5820559 mass_center=(0.0845693 0.0253708 0) inertia_xx=0.0004662381 inertia_yy=0.001298806
        inertia_zz=0.001365412 meshes=foot.vtp
      WeldJoint subtalar_r: parent_body=talus_r location_in_parent=(-0.04124443 -0.0354768 0.006697885)
          location=(0 0 0)
    Body toes_r: mass=0.1008586 mass_center=(0.029261 0.00507416 -0.0147996) inertia_xx=3.330272e-5
        inertia_yy=6.660545e-5 inertia_zz=3.330272e-5 meshes=bofoot.vtp
      WeldJoint mtp_r: parent_body=calcn_r location_in_parent=(0.1512098 -0.001691385 0.000913348) location=(0 0 0)
    Body femur_l: mass=4.331148 mass_center=(0 -0.142688 0) inertia_xx=0.04392491 inertia_yy=0.0115143
        inertia_zz=0.04631962 meshes=l_femur.vtp
      CustomJoint hip_l: parent_body=pelvis location_in_parent=(-0.05882482 -0.05791435 -0.07315958) location=(0 0 0)
        Coordinate hip_flexion_l: motion_type=rotational default_value=0 range=(-2.094395 2.094395) clamped=false
        Coordinate hip_adduction_l: motion_type=rotational default_value=0 range=(-2.094395 2.094395) clamped=false
        Coordinate hip_rotation_l: motion_type=rotational default_value=0 range=(-2.094395 2.094395) clamped=false
            locked=true
        SpatialTransform: axes_held_at_zero=(translation1 translation2 translation3)
          TransformAxis rotation1: coordinates=hip_flexion_l axis=(0 0 1) LinearFunction(coefficients=1 0)
          TransformAxis rotation2: coordinates=hip_adduction_l axis=(-1 0 0) LinearFunction(coefficients=1 0)
          TransformAxis rotation3: coordinates=hip_rotation_l axis=(0 -1 0) LinearFunction(coefficients=1 0)
    Body tibia_l: mass=1.726378 mass_center=(0 -0.176814 0) inertia_xx=0.02104892 inertia_yy=0.00212995
        inertia_zz=0.02134126 meshes=(l_tibia.vtp l_fibula.vtp)
      CustomJoint knee_l: parent_body=femur_l location_in_parent=(0 0 0) location=(0 0 0)
        Coordinate knee_angle_l: motion_type=rotational default_value=0 range=(-2.094395 0.1745329) clamped=false
        SpatialTransform: axes_held_at_zero=(rotation2 rotation3 translation3)
          TransformAxis rotation1: coordinates=knee_angle_l axis=(0 0 1) LinearFunction(coefficients=1 0)
          TransformAxis translation1: coordinates=knee_angle_l axis=(1 0 0)
            MultiplierFunction: scale=0.8393397
              SimmSpline: x=(-2.0944 -1.74533 -1.39626 -1.0472 -0.698132 -0.349066 -0.174533 0.197344 0.337395 0.490178 1.52146 2.0944)
                  y=(-0.0032 0.00179 0.00411 0.0041 0.00212 -0.001 -0.0031 -0.005227 -0.005435 -0.005574 -0.005435 -0.00525)
          TransformAxis translation2: coordinates=knee_angle_l axis=(0 1 0)
            MultiplierFunction: scale=0.8393397
              SimmSpline: x=(-2.0944 -1.22173 -0.523599 -0.349066 -0.174533 0.159149 2.0944)
                  y=(-0.4226 -0.4082 -0.399 -0.3976 -0.3966 -0.395264 -0.396)
    Body talus_l: mass=0.04656447 mass_center=(0 0 0) inertia_xx=0.0003261881 inertia_yy=0.0003261881
        inertia_zz=0.0003261881 meshes=l_talus.vtp
      PinJoint ankle_l: parent_body=tibia_l location_in_parent=(0 -0.4072309 0) location=(0 0 0)
        Coordinate ankle_angle_l: motion_type=rotational default_value=0 range=(-1.047198 1.047198) clamped=false
    Body calcn_l: mass=0.5820559 mass_center=(0.0836964 0.0251089 0) inertia_xx=0.0004566633 inertia_yy=0.001272134
        inertia_zz=0.001337371 meshes=l_foot.vtp
      WeldJoint subtalar_l: parent_body=talus_l location_in_parent=(-0.04081873 -0.03511063 -0.006628754)
          location=(0 0 0)
    Body toes_l: mass=0.1008586 mass_center=(0.0289589 0.00502178 0.0146469) inertia_xx=3.261881e-5
        inertia_yy=6.523762e-5 inertia_zz=3.261881e-5 meshes=l_bofoot.vtp
      WeldJoint mtp_l: parent_body=calcn_l location_in_parent=(0.1496491 -0.001673928 -0.000903921) location=(0 0 0)
    Body torso: mass=15.94209 mass_center=(-0.0248207 0.234038 0) inertia_xx=0.3935142 inertia_yy=0.2406849
        inertia_zz=0.3935142 meshes=(hat_spine.vtp hat_jaw.vtp hat_skull.vtp hat_ribs.vtp)
      PinJoint back: parent_body=pelvis location_in_parent=(-0.08378585 0.07140725 0) location=(0 0 0)
        Coordinate lumbar_extension: motion_type=rotational default_value=-0.0872665 range=(-1.570796 1.570796)
            clamped=false locked=true
    Body head: mass=0 mass_center=(0 0 0) inertia_xx=0 inertia_yy=0 inertia_zz=0
      WeldJoint back_0: parent_body=torso location_in_parent=(0 0.4022531 0) location=(0 0 0)
  ForceSet:
    Thelen2003Muscle [values shared by the 22 below unless stated]: min_control=0 max_control=1 optimal_force=1
        max_contraction_velocity=15 activation_time_constant=0.01 deactivation_time_constant=0.04
        FmaxTendonStrain=0.049
    Thelen2003Muscle abd_r: max_isometric_force=4460.29 optimal_fiber_length=0.07355117 tendon_slack_length=0.04613269
        pennation_angle_at_optimal=0 [radians]
      PathPoint glut_med2_r-P1: pelvis (-0.0711389 0.0389892 0.0671141)
      PathPoint glut_med2_r-P2: femur_r (-0.0219335 -0.00493078 0.0448021)
    Thelen2003Muscle add_r: max_isometric_force=3931.8 optimal_fiber_length=0.07427466 tendon_slack_length=0.05122391
        pennation_angle_at_optimal=0.08726646
      PathPoint add_mag1_r-P1: pelvis (-0.0609049 -0.102861 0.0223421)
      PathPoint add_mag1_r-P2: femur_r (-0.00382561 -0.102951 0.0288196)
    Thelen2003Muscle hamstrings_r: max_isometric_force=4105.466 optimal_fiber_length=0.05921603
        tendon_slack_length=0.299513 pennation_angle_at_optimal=0.2617994 FmaxMuscleStrain=0.8
      PathPoint semimem_r-P1: pelvis (-0.0991785 -0.0853996 0.0626544)
      ConditionalPathPoint semimem_r-P2: tibia_r (-0.0325131 -0.0328774 -0.0176673) range=(-0.558505 0.174533)
          coordinate=knee_angle_r
      PathPoint semimem_r-P3: tibia_r (-0.0252256 -0.0445747 -0.0182839)
    Thelen2003Muscle bifemsh_r: max_isometric_force=557.1148 optimal_fiber_length=0.09591085
        tendon_slack_length=0.1020143 pennation_angle_at_optimal=0.4014257
      PathPoint P1: femur_r (0.00425068 -0.179464 0.0198932)
      PathPoint P2: tibia_r (-0.0281219 -0.0336342 0.027496)
      PathPoint P3: tibia_r (-0.0218622 -0.0526001 0.0320459)
    Thelen2003Muscle glut_max_r: max_isometric_force=3337.584 optimal_fiber_length=0.1349066
        tendon_slack_length=0.04124532 pennation_angle_at_optimal=0
      PathPoint glut_max2_r-P1: pelvis (-0.112241 0.0154205 0.049328)
      PathPoint glut_max2_r-P2: pelvis (-0.114488 -0.0455605 0.0800813)
      PathPoint glut_max2_r-P3: femur_r (-0.0362158 -0.0450572 0.024909)
      PathPoint glut_max2_r-P4: femur_r (-0.0132621 -0.0863737 0.0356207)
    Thelen2003Muscle iliopsoas_r: max_isometric_force=2697.344 optimal_fiber_length=0.1010193
        tendon_slack_length=0.1122436 pennation_angle_at_optimal=0.1396263
      PathPoint psoas_r-P1: pelvis (-0.0538326 0.0777156 0.0253211)
      PathPoint psoas_r-P2: pelvis (-0.0198024 -0.0499413 0.0665007)
      ConditionalPathPoint psoas_r-P3: pelvis (-0.0239626 -0.0705311 0.0714949) range=(-1.5708 0.785398)
          coordinate=hip_flexion_r
      PathPoint psoas_r-P4: femur_r (0.00136022 -0.0431019 0.00323051)
      PathPoint psoas_r-P5: femur_r (-0.0159825 -0.0507531 0.00884141)
    Thelen2003Muscle rect_fem_r: max_isometric_force=2191.741 optimal_fiber_length=0.06450593
        tendon_slack_length=0.2936717 pennation_angle_at_optimal=0.08726646 FmaxMuscleStrain=1 KshapePassive=9
      PathPoint P1: pelvis (-0.024545 -0.0272487 0.0848125)
      ConditionalPathPoint P2: femur_r (0.0283945 -0.342604 0.00161526) range=(-2.61799 -1.45997)
          coordinate=knee_angle_r
      MovingPathPoint P3: tibia_r (0.0684862 0.0149069 0.001308) x_coordinate=knee_angle_r y_coordinate=knee_angle_r
          z_coordinate=knee_angle_r
        x_location: MultiplierFunction: scale=0.9342832
          SimmSpline: x=(-2.0944 -1.99997 -1.5708 -1.45752 -1.39626 -1.0472 -0.698132 -0.526391 -0.349066 -0.174533 0 0.00017453 0.00034907 0.0279253 0.0872665 0.174533 2.0944)
              y=(0.0155805 0.0179938 0.0275081 0.0296564 0.0307615 0.0365695 0.0422074 0.0450902 0.048391 0.0534299 0.0617576 0.0617669 0.0617762 0.0633083 0.066994 0.0733035 0.0573481)
        y_location: MultiplierFunction: scale=0.9342832
          SimmSpline: x=(-2.0944 -1.99997 -1.5708 -1.45752 -1.39626 -1.0472 -0.698132 -0.526391 -0.349066 -0.174533 0 0.00017453 0.00034907 0.0279253 0.0872665 0.174533 2.0944)
              y=(0.0234116 0.0237613 0.0251141 0.0252795 0.0253146 0.0249184 0.0242373 0.0238447 0.0234197 0.0227644 0.020984 0.0209814 0.0209788 0.0205225 0.0191754 0.0159554 -0.0673774)
        z_location: MultiplierFunction: scale=0.9342832
          SimmSpline: x=(-2.0944 0.1745) y=(0.0014 0.0014)
    Thelen2003Muscle vasti_r: max_isometric_force=9593.951 optimal_fiber_length=0.08332909
        tendon_slack_length=0.08585422 pennation_angle_at_optimal=0.05235988 FmaxMuscleStrain=1 KshapePassive=9
      PathPoint vas_int_r-P1: femur_r (0.0246539 -0.163566 0.0263542)
      PathPoint vas_int_r-P2: femur_r (0.0284795 -0.177168 0.0242289)
      ConditionalPathPoint vas_int_r-P3: femur_r (0.0291596 -0.342604 0.00467574) range=(-2.61799 -1.42)
          coordinate=knee_angle_r
      MovingPathPoint vas_int_r-P4: tibia_r (0.0639393 0.0203943 0.00168171) x_coordinate=knee_angle_r
          y_coordinate=knee_angle_r z_coordinate=knee_angle_r
        x_location: MultiplierFunction: scale=0.9342832
          SimmSpline: x=(-2.0944 -1.99997 -1.5708 -1.45752 -1.39626 -1.0472 -0.698132 -0.526391 -0.349066 -0.174533 0 0.00017453 0.00034907 0.0279253 0.0872665 0.174533 2.0944)
              y=(0.0082733 0.0106866 0.0202042 0.022353 0.0234583 0.0292715 0.0349465 0.037871 0.0412569 0.0465287 0.0554632 0.0554735 0.0554837 0.0571717 0.061272 0.0684368 0.0648818)
        y_location: MultiplierFunction: scale=0.9342832
          SimmSpline: x=(-2.0944 -1.99997 -1.5708 -1.45752 -1.39626 -1.0472 -0.698132 -0.526391 -0.349066 -0.174533 0 0.00017453 0.00034907 0.0279253 0.0872665 0.174533 2.0944)
              y=(0.025599 0.0259487 0.0273124 0.0274796 0.0275151 0.0271363 0.0265737 0.0263073 0.0261187 0.0260129 0.0252923 0.0252911 0.0252898 0.0250526 0.0242191 0.0218288 -0.0685706)
        z_location: MultiplierFunction: scale=0.9342832
          SimmSpline: x=(-2.0944 2.0944) y=(0.0018 0.0018)
    Thelen2003Muscle gastroc_r: max_isometric_force=4690.574 optimal_fiber_length=0.04743127
        tendon_slack_length=0.3571295 pennation_angle_at_optimal=0.296706 FmaxTendonStrain=0.1
      PathPoint med_gas_r-P1: femur_r (-0.0161526 -0.334018 -0.0199782)
      ConditionalPathPoint med_gas_r-P2: femur_r (-0.0255041 -0.341924 -0.0219335) range=(-0.785398 0.174533)
          coordinate=knee_angle_r
      PathPoint med_gas_r-P3: calcn_r (0 0.0262165 -0.00448217)
    Thelen2003Muscle soleus_r: max_isometric_force=7924.997 optimal_fiber_length=0.04086533
        tendon_slack_length=0.2266168 pennation_angle_at_optimal=0.4363323 FmaxTendonStrain=0.1
      PathPoint P1: tibia_r (-0.00224228 -0.143226 0.00663341)
      PathPoint P2: calcn_r (0 0.0262165 -0.00448217)
    Thelen2003Muscle tib_ant_r: max_isometric_force=2116.818 optimal_fiber_length=0.06244182
        tendon_slack_length=0.2185464 pennation_angle_at_optimal=0.08726646
      PathPoint P1: tibia_r (0.0167237 -0.151728 0.0107443)
      PathPoint P2: tibia_r (0.0307379 -0.369135 -0.0165368)
      PathPoint P3: calcn_r (0.0986078 0.0150533 -0.0257936)
    Thelen2003Muscle abd_l: max_isometric_force=4460.29 optimal_fiber_length=0.0733379 tendon_slack_length=0.04599892
        pennation_angle_at_optimal=0
      PathPoint glut_med2_l-P1: pelvis (-0.0711389 0.0389892 -0.0671141)
      PathPoint glut_med2_l-P2: femur_l (-0.021655 -0.00486817 -0.0442332)
    Thelen2003Muscle add_l: max_isometric_force=3931.8 optimal_fiber_length=0.07347374 tendon_slack_length=0.05067155
        pennation_angle_at_optimal=0.08726646
      PathPoint add_mag1_l-P1: pelvis (-0.0609049 -0.102861 -0.0223421)
      PathPoint add_mag1_l-P2: femur_l (-0.00377703 -0.101644 -0.0284536)
    Thelen2003Muscle hamstrings_l: max_isometric_force=4105.466 optimal_fiber_length=0.05861128
        tendon_slack_length=0.2964542 pennation_angle_at_optimal=0.2617994 FmaxMuscleStrain=0.8
      PathPoint semimem_l-P1: pelvis (-0.0991785 -0.0853996 -0.0626544)
      ConditionalPathPoint semimem_l-P2: tibia_l (-0.0329573 -0.0333266 0.0179087) range=(-0.558505 0.174533)
          coordinate=knee_angle_l
      PathPoint semimem_l-P3: tibia_l (-0.0255703 -0.0451837 0.0185337)
    Thelen2003Muscle bifemsh_l: max_isometric_force=557.1148 optimal_fiber_length=0.09539827
        tendon_slack_length=0.1014691 pennation_angle_at_optimal=0.4014257
      PathPoint P1: femur_l (0.0041967 -0.177185 -0.0196406)
      PathPoint P2: tibia_l (-0.0285062 -0.0340937 -0.0278716)
      PathPoint P3: tibia_l (-0.0221609 -0.0533188 -0.0324838)
    Thelen2003Muscle glut_max_l: max_isometric_force=3337.584 optimal_fiber_length=0.1340972
        tendon_slack_length=0.04099786 pennation_angle_at_optimal=0
      PathPoint glut_max2_l-P1: pelvis (-0.112241 0.0154205 -0.049328)
      PathPoint glut_max2_l-P2: pelvis (-0.114488 -0.0455605 -0.0800813)
      PathPoint glut_max2_l-P3: femur_l (-0.0357559 -0.044485 -0.0245927)
      PathPoint glut_max2_l-P4: femur_l (-0.0130937 -0.0852769 -0.0351683)
    Thelen2003Muscle iliopsoas_l: max_isometric_force=2697.344 optimal_fiber_length=0.1007471
        tendon_slack_length=0.1119412 pennation_angle_at_optimal=0.1396263
      PathPoint psoas_l-P1: pelvis (-0.0538326 0.0777156 -0.0253211)
      PathPoint psoas_l-P2: pelvis (-0.0198024 -0.0499413 -0.0665007)
      ConditionalPathPoint psoas_l-P3: pelvis (-0.0239626 -0.0705311 -0.0714949) range=(-1.5708 0.785398)
          coordinate=hip_flexion_l
      PathPoint psoas_l-P4: femur_l (0.00134294 -0.0425545 -0.00318949)
      PathPoint psoas_l-P5: femur_l (-0.0157796 -0.0501086 -0.00872913)
    Thelen2003Muscle rect_fem_l: max_isometric_force=2191.741 optimal_fiber_length=0.06367552
        tendon_slack_length=0.2898912 pennation_angle_at_optimal=0.08726646 FmaxMuscleStrain=1 KshapePassive=9
      PathPoint P1: pelvis (-0.024545 -0.0272487 -0.0848125)
      ConditionalPathPoint P2: femur_l (0.0280339 -0.338254 -0.00159475) range=(-2.61799 -1.45997)
          coordinate=knee_angle_l
      MovingPathPoint P3: tibia_l (0.069422 0.0151105 -0.00132587) x_coordinate=knee_angle_l y_coordinate=knee_angle_l
          z_coordinate=knee_angle_l
        x_location: MultiplierFunction: scale=0.9470486
          SimmSpline: x=(-2.0944 -1.99997 -1.5708 -1.45752 -1.39626 -1.0472 -0.698132 -0.526391 -0.349066 -0.174533 0 0.00017453 0.00034907 0.0279253 0.0872665 0.174533 2.0944)
              y=(0.0155805 0.0179938 0.0275081 0.0296564 0.0307615 0.0365695 0.0422074 0.0450902 0.048391 0.0534299 0.0617576 0.0617669 0.0617762 0.0633083 0.066994 0.0733035 0.0573481)
        y_location: MultiplierFunction: scale=0.9470486
          SimmSpline: x=(-2.0944 -1.99997 -1.5708 -1.45752 -1.39626 -1.0472 -0.698132 -0.526391 -0.349066 -0.174533 0 0.00017453 0.00034907 0.0279253 0.0872665 0.174533 2.0944)
              y=(0.0234116 0.0237613 0.0251141 0.0252795 0.0253146 0.0249184 0.0242373 0.0238447 0.0234197 0.0227644 0.020984 0.0209814 0.0209788 0.0205225 0.0191754 0.0159554 -0.0673774)
        z_location: MultiplierFunction: scale=0.9470486
          SimmSpline: x=(-2.0944 0.1745) y=(-0.0014 -0.0014)
    Thelen2003Muscle vasti_l: max_isometric_force=9593.951 optimal_fiber_length=0.08204462
        tendon_slack_length=0.08453082 pennation_angle_at_optimal=0.05235988 FmaxMuscleStrain=1 KshapePassive=9
      PathPoint vas_int_l-P1: femur_l (0.0243409 -0.161489 -0.0260195)
      PathPoint vas_int_l-P2: femur_l (0.0281179 -0.174918 -0.0239212)
      ConditionalPathPoint vas_int_l-P3: femur_l (0.0287894 -0.338254 -0.00461637) range=(-2.61799 -1.42)
          coordinate=knee_angle_l
      MovingPathPoint vas_int_l-P4: tibia_l (0.064813 0.0206729 -0.00170469) x_coordinate=knee_angle_l
          y_coordinate=knee_angle_l z_coordinate=knee_angle_l
        x_location: MultiplierFunction: scale=0.9470486
          SimmSpline: x=(-2.0944 -1.99997 -1.5708 -1.45752 -1.39626 -1.0472 -0.698132 -0.526391 -0.349066 -0.174533 0 0.00017453 0.00034907 0.0279253 0.0872665 0.174533 2.0944)
              y=(0.0082733 0.0106866 0.0202042 0.022353 0.0234583 0.0292715 0.0349465 0.037871 0.0412569 0.0465287 0.0554632 0.0554735 0.0554837 0.0571717 0.061272 0.0684368 0.0648818)
        y_location: MultiplierFunction: scale=0.9470486
          SimmSpline: x=(-2.0944 -1.99997 -1.5708 -1.45752 -1.39626 -1.0472 -0.698132 -0.526391 -0.349066 -0.174533 0 0.00017453 0.00034907 0.0279253 0.0872665 0.174533 2.0944)
              y=(0.025599 0.0259487 0.0273124 0.0274796 0.0275151 0.0271363 0.0265737 0.0263073 0.0261187 0.0260129 0.0252923 0.0252911 0.0252898 0.0250526 0.0242191 0.0218288 -0.0685706)
        z_location: MultiplierFunction: scale=0.9470486
          SimmSpline: x=(-2.0944 2.0944) y=(-0.0018 -0.0018)
    Thelen2003Muscle gastroc_l: max_isometric_force=4690.574 optimal_fiber_length=0.04802697
        tendon_slack_length=0.3616149 pennation_angle_at_optimal=0.296706 FmaxTendonStrain=0.1
      PathPoint med_gas_l-P1: femur_l (-0.0159475 -0.329777 0.0197245)
      ConditionalPathPoint med_gas_l-P2: femur_l (-0.0251802 -0.337582 0.021655) range=(-0.785398 0.174533)
          coordinate=knee_angle_l
      PathPoint med_gas_l-P3: calcn_l (0 0.0259459 0.00443591)
    Thelen2003Muscle soleus_l: max_isometric_force=7924.997 optimal_fiber_length=0.04136935
        tendon_slack_length=0.2294119 pennation_angle_at_optimal=0.4363323 FmaxTendonStrain=0.1
      PathPoint P1: tibia_l (-0.00227292 -0.145183 -0.00672405)
      PathPoint P2: calcn_l (0 0.0259459 0.00443591)
    Thelen2003Muscle tib_ant_l: max_isometric_force=2116.818 optimal_fiber_length=0.06305686
        tendon_slack_length=0.220699 pennation_angle_at_optimal=0.08726646
      PathPoint P1: tibia_l (0.0169522 -0.153801 -0.0108911)
      PathPoint P2: tibia_l (0.0311579 -0.374179 0.0167628)
      PathPoint P3: calcn_l (0.09759 0.014898 0.0255274)
  MarkerSet:
    Marker STRN: torso (0.104213 0.130497 -0.000672167)
    Marker RSHO: torso (-0.000539047 0.312187 0.13301)
    Marker LSHO: torso (-0.0180923 0.286635 -0.131299)
    Marker RASI: pelvis (-0.0240467 -0.0139642 0.0803732)
    Marker LASI: pelvis (-0.0556361 0.0103227 -0.117341)
    Marker RTHI: femur_r (-0.00263725 -0.196763 0.0940942)
    Marker RKNE: femur_r (-0.000990805 -0.333024 0.0428855)
    Marker RTIB: tibia_r (-0.0296373 -0.205994 0.0907374)
    Marker RANK: tibia_r (-0.0176617 -0.378723 0.0381388)
    Marker RHEE: calcn_r (-0.0121257 0.043588 -0.0178139)
    Marker RTOE: calcn_r (0.142156 0.0282538 0.0431103)
    Marker LTHI: femur_l (-0.0377422 -0.197782 -0.114833)
    Marker LKNE: femur_l (0.0138228 -0.325304 -0.0602117)
    Marker LTIB: tibia_l (-0.00691908 -0.194619 -0.107699)
    Marker LANK: tibia_l (-0.00378368 -0.379512 -0.0399738)
    Marker LHEE: calcn_l (-0.0129058 0.0491842 -0.000666809)
    Marker LTOE: calcn_l (0.153461 0.0282243 -2.24375e-5)
    Marker CLAV: torso (0.0627605 0.262029 -0.001837)
    Marker C7: torso (-0.05118 0.328781 0.00105691)
    Marker T10: torso (-0.0566088 0.075703 0.00993691)
    Marker RPSI: pelvis (-0.153663 0.067424 0.0505826)
    Marker LPSI: pelvis (-0.166902 0.0742279 -0.0351896)
    Marker RKNI: femur_r (0.00662362 -0.353529 -0.0776588)
    Marker LKNI: femur_l (0.00254219 -0.344904 0.062218)
    Marker RMED: tibia_r (0.0168094 -0.365235 -0.0281385)
    Marker LMED: tibia_l (-0.0014039 -0.369212 0.0339211)
