# OpenSim document version 40000
Model model_predictive:
  gravity: 0 -9.80665 0
  length_units: meters
  force_units: N
  credits:
    A reduced 3D gait model with 14 degrees of freedom and 22 muscles (based on planar gait9dof18 by Ajay Seth). Adjusted by Carmichael Ong to follow muscle strengths of Handsfield/Rajagopal and changed hamstrings to follow semimembranosus and to adjust passive curves of hamstrings, rect_fem, and vasti. Closely based on Delp S.L., Loan J.P., Hoy M.G., Zajac F.E., Topp E.L., Rosen J.M., Thelen D.G., Anderson F.C., Seth A. Notes: 3D, 23 DOF gait model created by D.G. Thelen, Univ. of Wisconsin-Madison, and Ajay Seth, Frank C. Anderson, and Scott L. Delp, Stanford University. Lower extremity joint defintions based on Delp et al. (1990). Low back joint and anthropometry based on Anderson and Pandy (1999, 2001). Planar knee model of Yamaguchi and Zajac (1989). Seth replaced tibia translation constraints with a CustomJoint for the knee and removed the patella to eliminate all kinematic constraints; insertions of the quadrucepts are handled with moving points in the tibia frame as defined by Delp 1990. Number of muscles was reduced by Anderson to improve simulation speed for demonstrations and is not intended to be used in research. License: Creative Commons (CCBY 3.0). You are free to distribute, remix, tweak, and build upon this work, even commercially, as long as you credit us for the original creation. http://creativecommons.org/licenses/by/3.0/ More Information: http://simtk-confluence.stanford.edu:8080/display/OpenSim/Gait+2392+and+2354+Models
  publications:
    Delp, S.L., Loan, J.P., Hoy, M.G., Zajac, F.E., Topp E.L., Rosen, J.M.: An interactive graphics-based model of the lower extremity to study orthopaedic surgical procedures, IEEE Transactions on Biomedical Engineering, vol. 37, pp. 757-767, 1990. Yamaguchi G.T., Zajac F.E.: A planar model of the knee joint to characterize the knee extensor mechanism." J . Biomech. vol. 22. pp. 1-10. 1989. Anderson F.C., Pandy M.G.: A dynamic optimization solution for vertical jumping in three dimensions. Computer Methods in Biomechanics and Biomedical Engineering 2:201-231, 1999. Anderson F.C., Pandy M.G.: Dynamic optimization of human walking. Journal of Biomechanical Engineering 123:381-390, 2001.
  Ground
  BodySet:
    Body pelvis: mass=5.483898 [kg] mass_center=(-0.0673063 0 0) inertia=(0.04786828 0.04055766 0.02696083 0 0 0)
        meshes=(sacrum.vtp pelvis.vtp l_pelvis.vtp)
    Body femur_r: mass=4.331148 mass_center=(0 -0.1679915 0) inertia=(0.06088527 0.01596022 0.06420463 0 0 0)
        meshes=femur.vtp
    Body tibia_r: mass=1.726378 mass_center=(0 -0.1902252 0) inertia=(0.02436311 0.002465315 0.02470149 0 0 0)
        meshes=(tibia.vtp fibula.vtp)
    Body talus_r: mass=0.04656447 mass_center=(0 0 0) inertia=(0.0004519593 0.0004519593 0.0004519593 0 0 0)
        meshes=talus.vtp
    Body calcn_r: mass=0.5820559 mass_center=(0.09851953 0.02955586 0)
        inertia=(0.0006327431 0.001762641 0.001853033 0 0 0) meshes=foot.vtp
    Body toes_r: mass=0.1008586 mass_center=(0.03408776 0.005911172 -0.01724092)
        inertia=(4.519593e-5 9.039187e-5 4.519593e-5 0 0 0) meshes=bofoot.vtp
    Body femur_l: mass=4.331148 mass_center=(0 -0.1676603 0) inertia=(0.06064542 0.01589734 0.06395171 0 0 0)
        meshes=l_femur.vtp
    Body tibia_l: mass=1.726378 mass_center=(0 -0.1845542 0) inertia=(0.02293214 0.002320514 0.02325064 0 0 0)
        meshes=(l_tibia.vtp l_fibula.vtp)
    Body talus_l: mass=0.04656447 mass_center=(0 0 0) inertia=(0.0004047166 0.0004047166 0.0004047166 0 0 0)
        meshes=l_talus.vtp
    Body calcn_l: mass=0.5820559 mass_center=(0.09322839 0.02796852 0)
        inertia=(0.0005666033 0.001578395 0.001659338 0 0 0) meshes=l_foot.vtp
    Body toes_l: mass=0.1008586 mass_center=(0.03225702 0.005593703 0.01631497)
        inertia=(4.047166e-5 8.094333e-5 4.047166e-5 0 0 0) meshes=l_bofoot.vtp
    Body torso: mass=15.94209 mass_center=(-0.03075217 0.2933639 0) inertia=(0.6865932 0.3517946 0.6665239 0 0 0)
        meshes=(hat_spine.vtp hat_jaw.vtp hat_skull.vtp hat_ribs.vtp)
    Body head: mass=0 mass_center=(0 0 0) inertia=(0 0 0 0 0 0)
  JointSet:
    CustomJoint ground_pelvis: socket_parent_frame=ground_offset socket_child_frame=pelvis_offset
      Coordinate pelvis_tilt: default_value=0 range=(-1.570796 1.570796) clamped=false
      Coordinate pelvis_list: default_value=0 range=(-1.570796 1.570796) clamped=false
      Coordinate pelvis_rotation: default_value=0 range=(-1.570796 1.570796) clamped=false
      Coordinate pelvis_tx: default_value=0 range=(-5 5) clamped=false
      Coordinate pelvis_ty: default_value=1.02 range=(-1 2) clamped=false
      Coordinate pelvis_tz: default_value=0 range=(-3 3) clamped=false
      PhysicalOffsetFrame ground_offset: socket_parent=/ground translation=(0 0 0) [meters]
      PhysicalOffsetFrame pelvis_offset: socket_parent=/bodyset/pelvis translation=(0 0 0)
      SpatialTransform:
        TransformAxis rotation1: coordinates=pelvis_tilt axis=(0 0 1) LinearFunction(coefficients=1 0)
        TransformAxis rotation2: coordinates=pelvis_list axis=(1 0 0) LinearFunction(coefficients=1 0)
        TransformAxis rotation3: coordinates=pelvis_rotation axis=(0 1 0) LinearFunction(coefficients=1 0)
        TransformAxis translation1: coordinates=pelvis_tx axis=(1 0 0) LinearFunction(coefficients=1 0)
        TransformAxis translation2: coordinates=pelvis_ty axis=(0 1 0) LinearFunction(coefficients=1 0)
        TransformAxis translation3: coordinates=pelvis_tz axis=(0 0 1) LinearFunction(coefficients=1 0)
    CustomJoint hip_r: socket_parent_frame=pelvis_offset socket_child_frame=femur_r_offset
      Coordinate hip_flexion_r: default_value=0 range=(-2.094395 2.094395) clamped=false
      Coordinate hip_adduction_r: default_value=0 range=(-2.094395 2.094395) clamped=false
      Coordinate hip_rotation_r: default_value=0 range=(-2.094395 2.094395) clamped=false locked=true
      PhysicalOffsetFrame pelvis_offset: socket_parent=/bodyset/pelvis translation=(-0.0673063 -0.06931816 0.0875653)
      PhysicalOffsetFrame femur_r_offset: socket_parent=/bodyset/femur_r translation=(0 0 0)
      SpatialTransform: axes_held_at_zero=(translation1 translation2 translation3)
        TransformAxis rotation1: coordinates=hip_flexion_r axis=(0 0 1) LinearFunction(coefficients=1 0)
        TransformAxis rotation2: coordinates=hip_adduction_r axis=(1 0 0) LinearFunction(coefficients=1 0)
        TransformAxis rotation3: coordinates=hip_rotation_r axis=(0 1 0) LinearFunction(coefficients=1 0)
    CustomJoint knee_r: socket_parent_frame=femur_r_offset socket_child_frame=tibia_r_offset
      Coordinate knee_angle_r: default_value=0 range=(-2.094395 0.1745329) clamped=false
      PhysicalOffsetFrame femur_r_offset: socket_parent=/bodyset/femur_r translation=(0 0 0)
      PhysicalOffsetFrame tibia_r_offset: socket_parent=/bodyset/tibia_r translation=(0 0 0)
      SpatialTransform: axes_held_at_zero=(rotation2 rotation3 translation3)
        TransformAxis rotation1: coordinates=knee_angle_r axis=(0 0 1) LinearFunction(coefficients=1 0)
        TransformAxis translation1: coordinates=knee_angle_r axis=(1 0 0)
          MultiplierFunction: scale=0.9881855
            SimmSpline: x=(-2.0944 -1.74533 -1.39626 -1.0472 -0.698132 -0.349066 -0.174533 0.197344 0.337395 0.490178 1.52146 2.0944)
                y=(-0.0032 0.00179 0.00411 0.0041 0.00212 -0.001 -0.0031 -0.005227 -0.005435 -0.005574 -0.005435 -0.00525)
        TransformAxis translation2: coordinates=knee_angle_r axis=(0 1 0)
          MultiplierFunction: scale=0.9881855
            SimmSpline: x=(-2.0944 -1.22173 -0.523599 -0.349066 -0.174533 0.159149 2.0944)
                y=(-0.4226 -0.4082 -0.399 -0.3976 -0.3966 -0.395264 -0.396)
    PinJoint ankle_r: socket_parent_frame=tibia_r_offset socket_child_frame=talus_r_offset
      Coordinate ankle_angle_r: default_value=0 range=(-1.570796 1.570796) clamped=false
      PhysicalOffsetFrame tibia_r_offset: socket_parent=/bodyset/tibia_r translation=(0 -0.4381191 0)
      PhysicalOffsetFrame talus_r_offset: socket_parent=/bodyset/talus_r translation=(0 0 0)
    WeldJoint subtalar_r: socket_parent_frame=talus_r_offset socket_child_frame=calcn_r_offset
      PhysicalOffsetFrame talus_r_offset: socket_parent=/bodyset/talus_r
          translation=(-0.04804798 -0.04132894 0.007802747)
      PhysicalOffsetFrame calcn_r_offset: socket_parent=/bodyset/calcn_r translation=(0 0 0)
    WeldJoint mtp_r: socket_parent_frame=calcn_r_offset socket_child_frame=toes_r_offset
      PhysicalOffsetFrame calcn_r_offset: socket_parent=/bodyset/calcn_r
          translation=(0.1761529 -0.001970391 0.001064011)
      PhysicalOffsetFrame toes_r_offset: socket_parent=/bodyset/toes_r translation=(0 0 0)
    CustomJoint hip_l: socket_parent_frame=pelvis_offset socket_child_frame=femur_l_offset
      Coordinate hip_flexion_l: default_value=0 range=(-2.094395 2.094395) clamped=false
      Coordinate hip_adduction_l: default_value=0 range=(-2.094395 2.094395) clamped=false
      Coordinate hip_rotation_l: default_value=0 range=(-2.094395 2.094395) clamped=false locked=true
      PhysicalOffsetFrame pelvis_offset: socket_parent=/bodyset/pelvis translation=(-0.0673063 -0.06931816 -0.0875653)
      PhysicalOffsetFrame femur_l_offset: socket_parent=/bodyset/femur_l translation=(0 0 0)
      SpatialTransform: axes_held_at_zero=(translation1 translation2 translation3)
        TransformAxis rotation1: coordinates=hip_flexion_l axis=(0 0 1) LinearFunction(coefficients=1 0)
        TransformAxis rotation2: coordinates=hip_adduction_l axis=(-1 0 0) LinearFunction(coefficients=1 0)
        TransformAxis rotation3: coordinates=hip_rotation_l axis=(0 -1 0) LinearFunction(coefficients=1 0)
    CustomJoint knee_l: socket_parent_frame=femur_l_offset socket_child_frame=tibia_l_offset
      Coordinate knee_angle_l: default_value=0 range=(-2.094395 0.1745329) clamped=false
      PhysicalOffsetFrame femur_l_offset: socket_parent=/bodyset/femur_l translation=(0 0 0)
      PhysicalOffsetFrame tibia_l_offset: socket_parent=/bodyset/tibia_l translation=(0 0 0)
      SpatialTransform: axes_held_at_zero=(rotation2 rotation3 translation3)
        TransformAxis rotation1: coordinates=knee_angle_l axis=(0 0 1) LinearFunction(coefficients=1 0)
        TransformAxis translation1: coordinates=knee_angle_l axis=(1 0 0)
          MultiplierFunction: scale=0.9862372
            SimmSpline: x=(-2.0944 -1.74533 -1.39626 -1.0472 -0.698132 -0.349066 -0.174533 0.197344 0.337395 0.490178 1.52146 2.0944)
                y=(-0.0032 0.00179 0.00411 0.0041 0.00212 -0.001 -0.0031 -0.005227 -0.005435 -0.005574 -0.005435 -0.00525)
        TransformAxis translation2: coordinates=knee_angle_l axis=(0 1 0)
          MultiplierFunction: scale=0.9862372
            SimmSpline: x=(-2.0944 -1.22173 -0.523599 -0.349066 -0.174533 0.159149 2.0944)
                y=(-0.4226 -0.4082 -0.399 -0.3976 -0.3966 -0.395264 -0.396)
    PinJoint ankle_l: socket_parent_frame=tibia_l_offset socket_child_frame=talus_l_offset
      Coordinate ankle_angle_l: default_value=0 range=(-1.047198 1.047198) clamped=false
      PhysicalOffsetFrame tibia_l_offset: socket_parent=/bodyset/tibia_l translation=(0 -0.4250579 0)
      PhysicalOffsetFrame talus_l_offset: socket_parent=/bodyset/talus_l translation=(0 0 0)
    WeldJoint subtalar_l: socket_parent_frame=talus_l_offset socket_child_frame=calcn_l_offset
      PhysicalOffsetFrame talus_l_offset: socket_parent=/bodyset/talus_l
          translation=(-0.04546749 -0.03910931 -0.007383688)
      PhysicalOffsetFrame calcn_l_offset: socket_parent=/bodyset/calcn_l translation=(0 0 0)
    WeldJoint mtp_l: socket_parent_frame=calcn_l_offset socket_child_frame=toes_l_offset
      PhysicalOffsetFrame calcn_l_offset: socket_parent=/bodyset/calcn_l
          translation=(0.1666924 -0.001864568 -0.001006867)
      PhysicalOffsetFrame toes_l_offset: socket_parent=/bodyset/toes_l translation=(0 0 0)
    PinJoint back: socket_parent_frame=pelvis_offset socket_child_frame=torso_offset
      Coordinate lumbar_extension: default_value=-0.0872665 range=(-1.570796 1.570796) clamped=false locked=true
      PhysicalOffsetFrame pelvis_offset: socket_parent=/bodyset/pelvis translation=(-0.09586626 0.08546793 0)
      PhysicalOffsetFrame torso_offset: socket_parent=/bodyset/torso translation=(0 0 0)
    WeldJoint back_0: socket_parent_frame=torso_offset socket_child_frame=head_offset
      PhysicalOffsetFrame torso_offset: socket_parent=/bodyset/torso translation=(0 0.5042191 0)
      PhysicalOffsetFrame head_offset: socket_parent=/bodyset/head translation=(0 0 0)
  ForceSet:
    Millard2012EquilibriumMuscle [values shared by the 22 below unless stated]: optimal_force=1
        max_contraction_velocity=15 activation_time_constant=0.01 [seconds] deactivation_time_constant=0.04 [seconds]
        minimum_activation=0.01
      ActiveForceLengthCurve: minimum_value=0
      ForceVelocityCurve: concentric_slope_at_vmax=0 concentric_slope_near_vmax=0.25 isometric_slope=5
          eccentric_slope_at_vmax=0 eccentric_slope_near_vmax=0.15 max_eccentric_velocity_force_multiplier=1.4
      FiberForceLengthCurve
      TendonForceLengthCurve
    Millard2012EquilibriumMuscle abd_r: max_isometric_force=4460.29 optimal_fiber_length=0.0874912
        tendon_slack_length=0.05487614 pennation_angle_at_optimal=0 [radians]
      PathPoint glut_med2_r-P1: pelvis (-0.08139588 0.04666654 0.08032937)
      PathPoint glut_med2_r-P2: femur_r (-0.02549519 -0.005731476 0.05207738)
    Millard2012EquilibriumMuscle add_r: max_isometric_force=3931.8 optimal_fiber_length=0.08673373
        tendon_slack_length=0.05981636 pennation_angle_at_optimal=0.08726646
      PathPoint add_mag1_r-P1: pelvis (-0.0696863 -0.1231158 0.0267415)
      PathPoint add_mag1_r-P2: femur_r (-0.004446835 -0.1196693 0.03349949)
    Millard2012EquilibriumMuscle hamstrings_r: max_isometric_force=4105.466 optimal_fiber_length=0.06811463
        tendon_slack_length=0.3445218 pennation_angle_at_optimal=0.2617994
      PathPoint semimem_r-P1: pelvis (-0.1134782 -0.1022155 0.07499156)
      ConditionalPathPoint semimem_r-P2: tibia_r (-0.03545708 -0.03585445 -0.01926705)
          socket_coordinate=/jointset/knee_r/knee_angle_r range=(-0.558505 0.174533) [radians]
      PathPoint semimem_r-P3: tibia_r (-0.02750981 -0.04861085 -0.01993952)
    Millard2012EquilibriumMuscle bifemsh_r: max_isometric_force=557.1148 optimal_fiber_length=0.1095717
        tendon_slack_length=0.1165445 pennation_angle_at_optimal=0.4014257
      PathPoint P1: femur_r (0.004940927 -0.208606 0.02312354)
      PathPoint P2: tibia_r (-0.03066834 -0.03667974 0.02998569)
      PathPoint P3: tibia_r (-0.02384183 -0.05736304 0.03494764)
    Millard2012EquilibriumMuscle glut_max_r: max_isometric_force=3337.584 optimal_fiber_length=0.1585907
        tendon_slack_length=0.04848631 pennation_angle_at_optimal=0
      PathPoint glut_max2_r-P1: pelvis (-0.1284246 0.01845688 0.05904104)
      PathPoint glut_max2_r-P2: pelvis (-0.130995 -0.05453169 0.09584993)
      PathPoint glut_max2_r-P3: femur_r (-0.0420967 -0.05237383 0.02895383)
      PathPoint glut_max2_r-P4: femur_r (-0.01541569 -0.1003996 0.04140497)
    Millard2012EquilibriumMuscle iliopsoas_r: max_isometric_force=2697.344 optimal_fiber_length=0.1193503
        tendon_slack_length=0.1326114 pennation_angle_at_optimal=0.1396263
      PathPoint psoas_r-P1: pelvis (-0.06159431 0.09301847 0.03030703)
      PathPoint psoas_r-P2: pelvis (-0.02265757 -0.05977512 0.07959529)
      ConditionalPathPoint psoas_r-P3: pelvis (-0.02741756 -0.08441924 0.0855728)
          socket_coordinate=/jointset/hip_r/hip_flexion_r range=(-1.5708 0.785398)
      PathPoint psoas_r-P4: femur_r (0.001581097 -0.050101 0.003755105)
      PathPoint psoas_r-P5: femur_r (-0.01857789 -0.05899467 0.01027713)
    Millard2012EquilibriumMuscle rect_fem_r: max_isometric_force=2191.741 optimal_fiber_length=0.07540595
        tendon_slack_length=0.3432955 pennation_angle_at_optimal=0.08726646
      PathPoint P1: pelvis (-0.02808396 -0.03261414 0.1015128)
      ConditionalPathPoint P2: femur_r (0.0330054 -0.3982388 0.001877552)
          socket_coordinate=/jointset/knee_r/knee_angle_r range=(-2.61799 -1.45997)
      MovingPathPoint P3: tibia_r socket_x_coordinate=/jointset/knee_r/knee_angle_r
          socket_y_coordinate=/jointset/knee_r/knee_angle_r socket_z_coordinate=/jointset/knee_r/knee_angle_r
        x_location: MultiplierFunction: scale=1.018882
          SimmSpline: x=(-2.0944 -1.99997 -1.5708 -1.45752 -1.39626 -1.0472 -0.698132 -0.526391 -0.349066 -0.174533 0 0.00017453 0.00034907 0.0279253 0.0872665 0.174533 2.0944)
              y=(0.0155805 0.0179938 0.0275081 0.0296564 0.0307615 0.0365695 0.0422074 0.0450902 0.048391 0.0534299 0.0617576 0.0617669 0.0617762 0.0633083 0.066994 0.0733035 0.0573481)
        y_location: MultiplierFunction: scale=1.018882
          SimmSpline: x=(-2.0944 -1.99997 -1.5708 -1.45752 -1.39626 -1.0472 -0.698132 -0.526391 -0.349066 -0.174533 0 0.00017453 0.00034907 0.0279253 0.0872665 0.174533 2.0944)
              y=(0.0234116 0.0237613 0.0251141 0.0252795 0.0253146 0.0249184 0.0242373 0.0238447 0.0234197 0.0227644 0.020984 0.0209814 0.0209788 0.0205225 0.0191754 0.0159554 -0.0673774)
        z_location: MultiplierFunction: scale=1.018882
          SimmSpline: x=(-2.0944 0.1745) y=(0.0014 0.0014)
    Millard2012EquilibriumMuscle vasti_r: max_isometric_force=9593.951 optimal_fiber_length=0.09751437
        tendon_slack_length=0.1004693 pennation_angle_at_optimal=0.05235988
      PathPoint vas_int_r-P1: femur_r (0.02865738 -0.1901269 0.03063375)
      PathPoint vas_int_r-P2: femur_r (0.03310421 -0.2059379 0.02816329)
      ConditionalPathPoint vas_int_r-P3: femur_r (0.03389476 -0.3982388 0.00543502)
          socket_coordinate=/jointset/knee_r/knee_angle_r range=(-2.61799 -1.42)
      MovingPathPoint vas_int_r-P4: tibia_r socket_x_coordinate=/jointset/knee_r/knee_angle_r
          socket_y_coordinate=/jointset/knee_r/knee_angle_r socket_z_coordinate=/jointset/knee_r/knee_angle_r
        x_location: MultiplierFunction: scale=1.018882
          SimmSpline: x=(-2.0944 -1.99997 -1.5708 -1.45752 -1.39626 -1.0472 -0.698132 -0.526391 -0.349066 -0.174533 0 0.00017453 0.00034907 0.0279253 0.0872665 0.174533 2.0944)
              y=(0.0082733 0.0106866 0.0202042 0.022353 0.0234583 0.0292715 0.0349465 0.037871 0.0412569 0.0465287 0.0554632 0.0554735 0.0554837 0.0571717 0.061272 0.0684368 0.0648818)
        y_location: MultiplierFunction: scale=1.018882
          SimmSpline: x=(-2.0944 -1.99997 -1.5708 -1.45752 -1.39626 -1.0472 -0.698132 -0.526391 -0.349066 -0.174533 0 0.00017453 0.00034907 0.0279253 0.0872665 0.174533 2.0944)
              y=(0.025599 0.0259487 0.0273124 0.0274796 0.0275151 0.0271363 0.0265737 0.0263073 0.0261187 0.0260129 0.0252923 0.0252911 0.0252898 0.0250526 0.0242191 0.0218288 -0.0685706)
        z_location: MultiplierFunction: scale=1.018882
          SimmSpline: x=(-2.0944 2.0944) y=(0.0018 0.0018)
    Millard2012EquilibriumMuscle gastroc_r: max_isometric_force=4690.574 optimal_fiber_length=0.05188129
        tendon_slack_length=0.3906356 pennation_angle_at_optimal=0.296706
      PathPoint med_gas_r-P1: femur_r (-0.01877552 -0.3882581 -0.02322236)
      ConditionalPathPoint med_gas_r-P2: femur_r (-0.02964556 -0.3974482 -0.02549519)
          socket_coordinate=/jointset/knee_r/knee_angle_r range=(-0.785398 0.174533)
      PathPoint med_gas_r-P3: calcn_r (0 0.03054105 -0.005221535)
    Millard2012EquilibriumMuscle soleus_r: max_isometric_force=7924.997 optimal_fiber_length=0.04473717
        tendon_slack_length=0.2480879 pennation_angle_at_optimal=0.4363323
      PathPoint P1: tibia_r (-0.002445316 -0.1561946 0.00723406)
      PathPoint P2: calcn_r (0 0.03054105 -0.005221535)
    Millard2012EquilibriumMuscle tib_ant_r: max_isometric_force=2116.818 optimal_fiber_length=0.06886039
        tendon_slack_length=0.2410114 pennation_angle_at_optimal=0.08726646
      PathPoint P1: tibia_r (0.01823798 -0.1654664 0.01171714)
      PathPoint P2: tibia_r (0.03352121 -0.4025602 -0.01803421)
      PathPoint P3: calcn_r (0.1148738 0.01753648 -0.03004846)
    Millard2012EquilibriumMuscle abd_l: max_isometric_force=4460.29 optimal_fiber_length=0.08745313
        tendon_slack_length=0.05485226 pennation_angle_at_optimal=0
      PathPoint glut_med2_l-P1: pelvis (-0.08139588 0.04666654 -0.08032937)
      PathPoint glut_med2_l-P2: femur_l (-0.02544492 -0.005720176 -0.0519747)
    Millard2012EquilibriumMuscle add_l: max_isometric_force=3931.8 optimal_fiber_length=0.08659107
        tendon_slack_length=0.05971798 pennation_angle_at_optimal=0.08726646
      PathPoint add_mag1_l-P1: pelvis (-0.0696863 -0.1231158 -0.0267415)
      PathPoint add_mag1_l-P2: femur_l (-0.004438067 -0.1194333 -0.03343344)
    Millard2012EquilibriumMuscle hamstrings_l: max_isometric_force=4105.466 optimal_fiber_length=0.06773532
        tendon_slack_length=0.3426033 pennation_angle_at_optimal=0.2617994
      PathPoint semimem_l-P1: pelvis (-0.1134782 -0.1022155 -0.07499156)
      ConditionalPathPoint semimem_l-P2: tibia_l (-0.03440004 -0.03478555 0.01869266)
          socket_coordinate=/jointset/knee_l/knee_angle_l range=(-0.558505 0.174533)
      PathPoint semimem_l-P3: tibia_l (-0.02668968 -0.04716166 0.01934508)
    Millard2012EquilibriumMuscle bifemsh_l: max_isometric_force=557.1148 optimal_fiber_length=0.1085504
        tendon_slack_length=0.1154582 pennation_angle_at_optimal=0.4014257
      PathPoint P1: femur_l (0.004931186 -0.2081947 -0.02307795)
      PathPoint P2: tibia_l (-0.02975405 -0.03558624 -0.02909176)
      PathPoint P3: tibia_l (-0.02313106 -0.05565293 -0.03390578)
    Millard2012EquilibriumMuscle glut_max_l: max_isometric_force=3337.584 optimal_fiber_length=0.158443
        tendon_slack_length=0.04844118 pennation_angle_at_optimal=0
      PathPoint glut_max2_l-P1: pelvis (-0.1284246 0.01845688 -0.05904104)
      PathPoint glut_max2_l-P2: pelvis (-0.130995 -0.05453169 -0.09584993)
      PathPoint glut_max2_l-P3: femur_l (-0.0420137 -0.05227057 -0.02889675)
      PathPoint glut_max2_l-P4: femur_l (-0.0153853 -0.1002017 -0.04132334)
    Millard2012EquilibriumMuscle iliopsoas_l: max_isometric_force=2697.344 optimal_fiber_length=0.119301
        tendon_slack_length=0.1325566 pennation_angle_at_optimal=0.1396263
      PathPoint psoas_l-P1: pelvis (-0.06159431 0.09301847 -0.03030703)
      PathPoint psoas_l-P2: pelvis (-0.02265757 -0.05977512 -0.07959529)
      ConditionalPathPoint psoas_l-P3: pelvis (-0.02741756 -0.08441924 -0.0855728)
          socket_coordinate=/jointset/hip_l/hip_flexion_l range=(-1.5708 0.785398)
      PathPoint psoas_l-P4: femur_l (0.001577979 -0.05000222 -0.003747701)
      PathPoint psoas_l-P5: femur_l (-0.01854126 -0.05887836 -0.01025687)
    Millard2012EquilibriumMuscle rect_fem_l: max_isometric_force=2191.741 optimal_fiber_length=0.07536588
        tendon_slack_length=0.3431131 pennation_angle_at_optimal=0.08726646
      PathPoint P1: pelvis (-0.02808396 -0.03261414 -0.1015128)
      ConditionalPathPoint P2: femur_l (0.03294032 -0.3974536 -0.001873851)
          socket_coordinate=/jointset/knee_l/knee_angle_l range=(-2.61799 -1.45997)
      MovingPathPoint P3: tibia_l socket_x_coordinate=/jointset/knee_l/knee_angle_l
          socket_y_coordinate=/jointset/knee_l/knee_angle_l socket_z_coordinate=/jointset/knee_l/knee_angle_l
        x_location: MultiplierFunction: scale=0.9885068
          SimmSpline: x=(-2.0944 -1.99997 -1.5708 -1.45752 -1.39626 -1.0472 -0.698132 -0.526391 -0.349066 -0.174533 0 0.00017453 0.00034907 0.0279253 0.0872665 0.174533 2.0944)
              y=(0.0155805 0.0179938 0.0275081 0.0296564 0.0307615 0.0365695 0.0422074 0.0450902 0.048391 0.0534299 0.0617576 0.0617669 0.0617762 0.0633083 0.066994 0.0733035 0.0573481)
        y_location: MultiplierFunction: scale=0.9885068
          SimmSpline: x=(-2.0944 -1.99997 -1.5708 -1.45752 -1.39626 -1.0472 -0.698132 -0.526391 -0.349066 -0.174533 0 0.00017453 0.00034907 0.0279253 0.0872665 0.174533 2.0944)
              y=(0.0234116 0.0237613 0.0251141 0.0252795 0.0253146 0.0249184 0.0242373 0.0238447 0.0234197 0.0227644 0.020984 0.0209814 0.0209788 0.0205225 0.0191754 0.0159554 -0.0673774)
        z_location: MultiplierFunction: scale=0.9885068
          SimmSpline: x=(-2.0944 0.1745) y=(-0.0014 -0.0014)
    Millard2012EquilibriumMuscle vasti_l: max_isometric_force=9593.951 optimal_fiber_length=0.09761375
        tendon_slack_length=0.1005717 pennation_angle_at_optimal=0.05235988
      PathPoint vas_int_l-P1: femur_l (0.02860088 -0.189752 -0.03057335)
      PathPoint vas_int_l-P2: femur_l (0.03303895 -0.2055318 -0.02810776)
      ConditionalPathPoint vas_int_l-P3: femur_l (0.03382794 -0.3974536 -0.005424304)
          socket_coordinate=/jointset/knee_l/knee_angle_l range=(-2.61799 -1.42)
      MovingPathPoint vas_int_l-P4: tibia_l socket_x_coordinate=/jointset/knee_l/knee_angle_l
          socket_y_coordinate=/jointset/knee_l/knee_angle_l socket_z_coordinate=/jointset/knee_l/knee_angle_l
        x_location: MultiplierFunction: scale=0.9885068
          SimmSpline: x=(-2.0944 -1.99997 -1.5708 -1.45752 -1.39626 -1.0472 -0.698132 -0.526391 -0.349066 -0.174533 0 0.00017453 0.00034907 0.0279253 0.0872665 0.174533 2.0944)
              y=(0.0082733 0.0106866 0.0202042 0.022353 0.0234583 0.0292715 0.0349465 0.037871 0.0412569 0.0465287 0.0554632 0.0554735 0.0554837 0.0571717 0.061272 0.0684368 0.0648818)
        y_location: MultiplierFunction: scale=0.9885068
          SimmSpline: x=(-2.0944 -1.99997 -1.5708 -1.45752 -1.39626 -1.0472 -0.698132 -0.526391 -0.349066 -0.174533 0 0.00017453 0.00034907 0.0279253 0.0872665 0.174533 2.0944)
              y=(0.025599 0.0259487 0.0273124 0.0274796 0.0275151 0.0271363 0.0265737 0.0263073 0.0261187 0.0260129 0.0252923 0.0252911 0.0252898 0.0250526 0.0242191 0.0218288 -0.0685706)
        z_location: MultiplierFunction: scale=0.9885068
          SimmSpline: x=(-2.0944 2.0944) y=(-0.0018 -0.0018)
    Millard2012EquilibriumMuscle gastroc_l: max_isometric_force=4690.574 optimal_fiber_length=0.05032552
        tendon_slack_length=0.3789216 pennation_angle_at_optimal=0.296706
      PathPoint med_gas_l-P1: femur_l (-0.01873851 -0.3874926 0.02317657)
      ConditionalPathPoint med_gas_l-P2: femur_l (-0.02958712 -0.3966646 0.02544492)
          socket_coordinate=/jointset/knee_l/knee_angle_l range=(-0.785398 0.174533)
      PathPoint med_gas_l-P3: calcn_l (0 0.0289008 0.004941105)
    Millard2012EquilibriumMuscle soleus_l: max_isometric_force=7924.997 optimal_fiber_length=0.04333879
        tendon_slack_length=0.2403333 pennation_angle_at_optimal=0.4363323
      PathPoint P1: tibia_l (-0.002372416 -0.1515381 -0.007018398)
      PathPoint P2: calcn_l (0 0.0289008 0.004941105)
    Millard2012EquilibriumMuscle tib_ant_l: max_isometric_force=2116.818 optimal_fiber_length=0.06651733
        tendon_slack_length=0.2328107 pennation_angle_at_optimal=0.08726646
      PathPoint P1: tibia_l (0.01769427 -0.1605335 -0.01136783)
      PathPoint P2: tibia_l (0.03252187 -0.390559 0.01749657)
      PathPoint P3: calcn_l (0.1087043 0.01659465 0.02843466)
    HuntCrossleyForce foot_r: transition_velocity=0.1
      ContactParametersSet contact_parameters:
        ContactParameters: geometry=(platform heel_r toe1_r toe2_r) stiffness=2000000 dissipation=1 static_friction=0.8
            dynamic_friction=0.8 viscous_friction=0.6
    HuntCrossleyForce foot_l: transition_velocity=0.1
      ContactParametersSet contact_parameters:
        ContactParameters: geometry=(platform heel_l toe1_l toe2_l) stiffness=2000000 dissipation=1 static_friction=0.8
            dynamic_friction=0.8 viscous_friction=0.6
    CoordinateLimitForce [values shared by the 6 below unless stated]: upper_stiffness=20 [N*m/degree]
        lower_stiffness=20 [N*m/degree] damping=0.25 transition=10 [degrees]
    CoordinateLimitForce hip_flexion_limit_r: coordinate=hip_flexion_r upper_limit=120 [degrees]
        lower_limit=-30 [degrees]
    CoordinateLimitForce hip_flexion_limit_l: coordinate=hip_flexion_l upper_limit=120 lower_limit=-30
    CoordinateLimitForce knee_limit_r: coordinate=knee_angle_r upper_limit=0 lower_limit=-140
    CoordinateLimitForce knee_limit_l: coordinate=knee_angle_l upper_limit=0 lower_limit=-140
    CoordinateLimitForce ankle_limit_r: coordinate=ankle_angle_r upper_limit=20 lower_limit=-40
    CoordinateLimitForce ankle_limit_l: coordinate=ankle_angle_l upper_limit=20 lower_limit=-40
  MarkerSet:
    Marker STRN: torso (0.09936856 0.1799897 -0.003266259)
    Marker RSHO: torso (-0.01444062 0.3738145 0.1681461)
    Marker LSHO: torso (-0.008808062 0.377083 -0.1697263)
    Marker RASI: pelvis (-0.005582109 0.0186661 0.1287194)
    Marker LASI: pelvis (-0.001473407 0.01545041 -0.1177645)
    Marker RTHI: femur_r (0.009725725 -0.2784062 0.1096224)
    Marker RKNE: femur_r (0.00398437 -0.3916541 0.0549306)
    Marker RTIB: tibia_r (-0.01266616 -0.1845909 0.1133853)
    Marker RANK: tibia_r (-0.001349303 -0.40757 0.04371992)
    Marker RHEE: calcn_r (-0.009722123 0.03666499 0.009704411)
    Marker RTOE: calcn_r (0.1840443 0.02641471 0.01274187)
    Marker LTHI: femur_l (0.006210548 -0.2917973 -0.1037469)
    Marker LKNE: femur_l (-0.002061786 -0.391256 -0.05738024)
    Marker LTIB: tibia_l (-0.02048836 -0.1737411 -0.1099454)
    Marker LANK: tibia_l (-0.009288532 -0.3968415 -0.04125106)
    Marker LHEE: calcn_l (-0.01035265 0.03168386 -0.002538385)
    Marker LTOE: calcn_l (0.1755698 0.0238366 -0.01860255)
    Marker CLAV: torso (0.07488106 0.3383952 -0.005138669)
    Marker C7: torso (-0.0320139 0.4308879 -0.01160788)
    Marker T10: torso (-0.1059115 0.131719 -0.005649106)
    Marker RPSI: pelvis (-0.163793 0.03960089 0.05375969)
    Marker LPSI: pelvis (-0.1623307 0.03702979 -0.0485991)
    Marker RKNI: femur_r (-0.006802532 -0.4005256 -0.06434963)
    Marker LKNI: femur_l (0.004552367 -0.4043675 0.05838204)
    Marker RMED: tibia_r (-0.007063474 -0.3964914 -0.03915005)
    Marker LMED: tibia_l (0.001468943 -0.3871158 0.03852313)
  ContactGeometrySet:
    ContactHalfSpace platform: socket_frame=/ground location=(0 0 0) orientation=(0 0 -1.570796)
    ContactSphere heel_r: socket_frame=/bodyset/calcn_r location=(0.03 0.02 0) radius=0.05
    ContactSphere toe1_r: socket_frame=/bodyset/toes_r location=(0.02 -0.005 -0.026) radius=0.025
    ContactSphere toe2_r: socket_frame=/bodyset/toes_r location=(0.02 -0.005 0.026) radius=0.025
    ContactSphere heel_l: socket_frame=/bodyset/calcn_l location=(0.03 0.02 0) radius=0.05
    ContactSphere toe1_l: socket_frame=/bodyset/toes_l location=(0.02 -0.005 -0.026) radius=0.025
    ContactSphere toe2_l: socket_frame=/bodyset/toes_l location=(0.02 -0.005 0.026) radius=0.025
