# OpenSim document version 30000
AnalyzeTool task:
  model_file: ../scale/model_scaled.osim
  replace_force_set: false
  results_directory: .
  output_precision: 8
  initial_time: 0
  final_time: 3.53
  solve_for_equilibrium_for_auxiliary_states: false
  maximum_number_of_integrator_steps: 20000
  maximum_integrator_step_size: 1
  minimum_integrator_step_size: 1e-8
  integrator_error_tolerance: 1e-5
  coordinates_file: ../inverse_kinematics/task_InverseKinematics.mot
  lowpass_cutoff_frequency_for_coordinates: 6
  AnalysisSet Analyses:
    Kinematics: start_time=-infinity end_time=infinity step_interval=1 in_degrees=false
    BodyKinematics: start_time=-infinity end_time=infinity step_interval=1 in_degrees=false bodies=all
        express_results_in_body_local_frame=false
