# OpenSim document version 30000
AnalyzeTool task:
  replace_force_set: false
  results_directory: .
  output_precision: 8
  initial_time: 0
  final_time: 10
  solve_for_equilibrium_for_auxiliary_states: false
  maximum_number_of_integrator_steps: 20000
  maximum_integrator_step_size: 1
  minimum_integrator_step_size: 1e-8
  integrator_error_tolerance: 1e-5
  states_file: ../experimental_data/healthy_gait.sto
  lowpass_cutoff_frequency_for_coordinates: -1
  AnalysisSet Analyses:
    Kinematics: start_time=0 end_time=10 step_interval=1 in_degrees=false
    BodyKinematics: start_time=0 end_time=10 step_interval=1 in_degrees=false bodies=all
        express_results_in_body_local_frame=false
