# OpenSim document version 30000
InverseKinematicsTool task:
  results_directory: .
  model_file: ../scale/model_scaled.osim
  constraint_weight: Inf
  accuracy: 1e-5
  marker_file: ../experimental_data/task.trc
  report_errors: true
  output_motion_file: ./task_InverseKinematics.mot
  report_marker_locations: true
  IKTaskSet:
    IKMarkerTask STRN: apply=true weight=1
    IKMarkerTask RSHO: apply=true weight=1
    IKMarkerTask LSHO: apply=true weight=1
    IKMarkerTask RASI: apply=true weight=1
    IKMarkerTask LASI: apply=true weight=1
    IKMarkerTask RTHI: apply=true weight=1
    IKMarkerTask RKNE: apply=true weight=1
    IKMarkerTask RTIB: apply=true weight=1
    IKMarkerTask RANK: apply=true weight=1
    IKMarkerTask RHEE: apply=true weight=1
    IKMarkerTask RTOE: apply=true weight=1
    IKMarkerTask LTHI: apply=true weight=1
    IKMarkerTask LKNE: apply=true weight=1
    IKMarkerTask LTIB: apply=true weight=1
    IKMarkerTask LANK: apply=true weight=1
    IKMarkerTask LHEE: apply=true weight=1
    IKMarkerTask LTOE: apply=true weight=1
    IKMarkerTask CLAV: apply=true weight=1
    IKMarkerTask C7: apply=true weight=1
    IKMarkerTask T10: apply=true weight=1
    IKMarkerTask RPSI: apply=true weight=1
    IKMarkerTask LPSI: apply=true weight=1
    IKMarkerTask RHJC: apply=true weight=1
    IKMarkerTask LHJC: apply=true weight=1
    IKMarkerTask RKJC: apply=true weight=1
    IKMarkerTask LKJC: apply=true weight=1
    IKMarkerTask RAJC: apply=true weight=1
    IKMarkerTask LAJC: apply=true weight=1
