# OpenSim document version 40000
ForceSet:
  Millard2012EquilibriumMuscle [values shared by the 92 below unless stated]: min_control=0.01 max_control=1
      max_contraction_velocity=10 ignore_tendon_compliance=true default_activation=0.05
      activation_time_constant=0.01 [seconds] deactivation_time_constant=0.04 [seconds]
  Millard2012EquilibriumMuscle glut_med1_r: max_isometric_force=819 optimal_fiber_length=0.04760094
      tendon_slack_length=0.0693995 pennation_angle_at_optimal=0.1396263 [radians]
    PathPoint P1: pelvis (-0.0351437 0.02651862 0.1105026)
    PathPoint P2: femur_r (-0.0209139 -0.01122443 0.0532441)
  Millard2012EquilibriumMuscle glut_med2_r: max_isometric_force=573 optimal_fiber_length=0.0756141
      tendon_slack_length=0.04742659 pennation_angle_at_optimal=0
    PathPoint P1: pelvis (-0.07364673 0.03881838 0.07001243)
    PathPoint P2: femur_r (-0.02475131 -0.005564248 0.05055791)
  Millard2012EquilibriumMuscle glut_med3_r: max_isometric_force=653 optimal_fiber_length=0.05826094
      tendon_slack_length=0.04779922 pennation_angle_at_optimal=0.3316126
    PathPoint P1: pelvis (-0.105345 0.009159393 0.05922722)
    PathPoint P2: femur_r (-0.02964401 -0.00450896 0.04969449)
  Millard2012EquilibriumMuscle glut_min1_r: max_isometric_force=270 optimal_fiber_length=0.06144354
      tendon_slack_length=0.0144573 pennation_angle_at_optimal=0.1745329
    PathPoint P1: pelvis (-0.04022576 -0.006978585 0.09651844)
    PathPoint P2: femur_r (-0.006907343 -0.009977273 0.05372378)
  Millard2012EquilibriumMuscle glut_min2_r: max_isometric_force=285 optimal_fiber_length=0.05092287
      tendon_slack_length=0.02364276 pennation_angle_at_optimal=0
    PathPoint P1: pelvis (-0.05452442 -0.0056701 0.09057744)
    PathPoint P2: femur_r (-0.00920979 -0.009977273 0.05372378)
  Millard2012EquilibriumMuscle glut_min3_r: max_isometric_force=323 optimal_fiber_length=0.03470972
      tendon_slack_length=0.04658409 pennation_angle_at_optimal=0.01745329
    PathPoint P1: pelvis (-0.07183786 -0.005495636 0.07823843)
    PathPoint P2: femur_r (-0.01295127 -0.007962631 0.05276442)
  Millard2012EquilibriumMuscle semimem_r: max_isometric_force=1288 optimal_fiber_length=0.07713767
      tendon_slack_length=0.3461553 pennation_angle_at_optimal=0.2617994
    PathPoint P1: pelvis (-0.1026747 -0.08502534 0.06536017)
    ConditionalPathPoint P2: tibia_r (-0.03293826 -0.0333074 -0.01789835)
        socket_coordinate=/jointset/knee_r/knee_angle_r range=(-0.558505 0.174533) [radians]
    PathPoint P3: tibia_r (-0.02555555 -0.0451576 -0.01852304)
  Millard2012EquilibriumMuscle semiten_r: max_isometric_force=410 optimal_fiber_length=0.193827
      tendon_slack_length=0.2463821 pennation_angle_at_optimal=0.08726646
    PathPoint P1: pelvis (-0.1088335 -0.09585087 0.05519648)
    ConditionalPathPoint P2: tibia_r (-0.03978147 -0.02706048 -0.02155184)
        socket_coordinate=/jointset/knee_r/knee_angle_r range=(-0.331613 0.174533)
    PathPoint P3: tibia_r (-0.03144279 -0.04999422 -0.02165596)
    PathPoint P4: tibia_r (-0.01069547 -0.07060903 -0.02318929)
    PathPoint P5: tibia_r (0.002555555 -0.09048557 -0.01826748)
  Millard2012EquilibriumMuscle bifemlh_r: max_isometric_force=896 optimal_fiber_length=0.1051077
      tendon_slack_length=0.3143588 pennation_angle_at_optimal=0
    PathPoint P1: pelvis (-0.1084976 -0.08947419 0.06346818)
    PathPoint P2: tibia_r (-0.0284897 -0.03407406 0.02785555)
    PathPoint P3: tibia_r (-0.02214814 -0.05328805 0.03246501)
  Millard2012EquilibriumMuscle bifemsh_r: max_isometric_force=804 optimal_fiber_length=0.1653956
      tendon_slack_length=0.08508791 pennation_angle_at_optimal=0.4014257
    PathPoint P1: femur_r (0.004796766 -0.2025195 0.02244886)
    PathPoint P2: tibia_r (-0.0284897 -0.03407406 0.02785555)
    PathPoint P3: tibia_r (-0.02214814 -0.05328805 0.03246501)
  Millard2012EquilibriumMuscle sar_r: max_isometric_force=156 optimal_fiber_length=0.4917691
      tendon_slack_length=0.09457098 pennation_angle_at_optimal=0
    PathPoint P1: pelvis (-0.01317889 -0.00113402 0.1135188)
    PathPoint P2: femur_r (-0.00287806 -0.3422972 -0.04038877)
    PathPoint P3: tibia_r (-0.00530041 -0.03965842 -0.03776542)
    PathPoint P4: tibia_r (0.00567901 -0.05574895 -0.03625102)
    PathPoint P5: tibia_r (0.02299999 -0.07950615 -0.02385184)
  Millard2012EquilibriumMuscle add_long_r: max_isometric_force=627 optimal_fiber_length=0.1321129
      tendon_slack_length=0.1053074 pennation_angle_at_optimal=0.1047198
    PathPoint P1: pelvis (-0.02721914 -0.07292622 0.01544661)
    PathPoint P2: femur_r (0.004796766 -0.2025195 0.02244886)
  Millard2012EquilibriumMuscle add_brev_r: max_isometric_force=429 optimal_fiber_length=0.1269357
      tendon_slack_length=0.01908807 pennation_angle_at_optimal=0
    PathPoint P1: pelvis (-0.05056214 -0.07981757 0.01498961)
    PathPoint P2: femur_r (0.0008634179 -0.1147386 0.02820498)
  Millard2012EquilibriumMuscle add_mag1_r: max_isometric_force=381 optimal_fiber_length=0.08401317
      tendon_slack_length=0.05794011 pennation_angle_at_optimal=0.08726646
    PathPoint P1: pelvis (-0.06305194 -0.1024107 0.02330701)
    PathPoint P2: femur_r (-0.004317089 -0.1161777 0.03252207)
  Millard2012EquilibriumMuscle add_mag2_r: max_isometric_force=343 optimal_fiber_length=0.1181162
      tendon_slack_length=0.11714 pennation_angle_at_optimal=0.05235988
    PathPoint P1: pelvis (-0.07157945 -0.1039809 0.02815121)
    PathPoint P2: femur_r (0.005180507 -0.2192122 0.02177732)
  Millard2012EquilibriumMuscle add_mag3_r: max_isometric_force=488 optimal_fiber_length=0.1270593
      tendon_slack_length=0.2415096 pennation_angle_at_optimal=0.08726646
    PathPoint P1: pelvis (-0.09568045 -0.09955824 0.0446215)
    PathPoint P2: femur_r (0.006715472 -0.3681038 -0.02551879)
  Millard2012EquilibriumMuscle tfl_r: max_isometric_force=233 optimal_fiber_length=0.08970556
      tendon_slack_length=0.4013144 pennation_angle_at_optimal=0.05235988
    PathPoint P1: pelvis (-0.02678846 0.01866772 0.1134274)
    PathPoint P2: femur_r (0.02820498 -0.09545564 0.05727338)
    PathPoint P3: femur_r (0.005180507 -0.3884421 0.03424891)
    PathPoint P4: tibia_r (0.00567901 -0.04609463 0.0281111)
  Millard2012EquilibriumMuscle pect_r: max_isometric_force=266 optimal_fiber_length=0.09456655
      tendon_slack_length=0.03120696 pennation_angle_at_optimal=0
    PathPoint P1: pelvis (-0.03712484 -0.06699442 0.04122142)
    PathPoint P2: femur_r (-0.01170411 -0.07885883 0.02427164)
  Millard2012EquilibriumMuscle grac_r: max_isometric_force=162 optimal_fiber_length=0.3402812
      tendon_slack_length=0.1218052 pennation_angle_at_optimal=0.05235988
    PathPoint P1: pelvis (-0.06374964 -0.1035448 0.02553717)
    ConditionalPathPoint P2: tibia_r (-0.02514855 -0.03019341 -0.03572098)
        socket_coordinate=/jointset/knee_r/knee_angle_r range=(-0.436332 0.174533)
    PathPoint P3: tibia_r (-0.01839053 -0.04877323 -0.03388476)
    PathPoint P4: tibia_r (0.00567901 -0.07912755 -0.02158024)
  Millard2012EquilibriumMuscle glut_max1_r: max_isometric_force=573 optimal_fiber_length=0.1282396
      tendon_slack_length=0.1128869 pennation_angle_at_optimal=0.08726646
    PathPoint P1: pelvis (-0.1029331 0.05338618 0.06398003)
    PathPoint P2: pelvis (-0.1112023 0.001046788 0.08098043)
    PathPoint P3: femur_r (-0.04384244 -0.02379196 0.03760664)
    PathPoint P4: femur_r (-0.02657408 -0.05429939 0.0450896)
  Millard2012EquilibriumMuscle glut_max2_r: max_isometric_force=819 optimal_fiber_length=0.1347067
      tendon_slack_length=0.1163792 pennation_angle_at_optimal=0
    PathPoint P1: pelvis (-0.1161982 0.01535289 0.05145822)
    PathPoint P2: pelvis (-0.1185239 -0.0453608 0.08353963)
    PathPoint P3: femur_r (-0.04086845 -0.05084572 0.02810905)
    PathPoint P4: femur_r (-0.01496591 -0.09747028 0.0401969)
  Millard2012EquilibriumMuscle glut_max3_r: max_isometric_force=552 optimal_fiber_length=0.1325188
      tendon_slack_length=0.1334391 pennation_angle_at_optimal=0.08726646
    PathPoint P1: pelvis (-0.1340284 -0.02739095 0.005301202)
    PathPoint P2: pelvis (-0.1317027 -0.0917684 0.03683421)
    PathPoint P3: femur_r (-0.02868466 -0.09986867 0.01295127)
    PathPoint P4: femur_r (-0.005756119 -0.1361322 0.03942942)
  Millard2012EquilibriumMuscle iliacus_r: max_isometric_force=1073 optimal_fiber_length=0.08962372
      tendon_slack_length=0.08962372 pennation_angle_at_optimal=0.1221731
    PathPoint P1: pelvis (-0.05805602 0.0318398 0.07805563)
    PathPoint P2: pelvis (-0.02222322 -0.04797777 0.07412543)
    ConditionalPathPoint P3: pelvis (-0.02480732 -0.07022201 0.07458243)
        socket_coordinate=/jointset/hip_r/hip_flexion_r range=(-1.5708 0.785398)
    PathPoint P4: femur_r (0.0016309 -0.05209288 0.005468313)
    PathPoint P5: femur_r (-0.01851552 -0.05957583 0.01237566)
  Millard2012EquilibriumMuscle psoas_r: max_isometric_force=1113 optimal_fiber_length=0.08923296
      tendon_slack_length=0.1427727 pennation_angle_at_optimal=0.1396263
    PathPoint P1: pelvis (-0.05573033 0.07737506 0.02641461)
    PathPoint P2: pelvis (-0.02050049 -0.04972242 0.06937263)
    ConditionalPathPoint P3: pelvis (-0.02480732 -0.07022201 0.07458243)
        socket_coordinate=/jointset/hip_r/hip_flexion_r range=(-1.5708 0.785398)
    PathPoint P4: femur_r (0.001534965 -0.04863921 0.003645542)
    PathPoint P5: femur_r (-0.01803584 -0.05727338 0.009977273)
  Millard2012EquilibriumMuscle quad_fem_r: max_isometric_force=381 optimal_fiber_length=0.05002723
      tendon_slack_length=0.02223432 pennation_angle_at_optimal=0
    PathPoint P1: pelvis (-0.09845405 -0.1004044 0.04752802)
    PathPoint P2: femur_r (-0.03655136 -0.03444078 0.03511233)
  Millard2012EquilibriumMuscle gem_r: max_isometric_force=164 optimal_fiber_length=0.02209884
      tendon_slack_length=0.03591062 pennation_angle_at_optimal=0
    PathPoint P1: pelvis (-0.09759268 -0.0715305 0.06525963)
    PathPoint P2: femur_r (-0.01362282 -0.003165865 0.04249935)
  Millard2012EquilibriumMuscle peri_r: max_isometric_force=444 optimal_fiber_length=0.02348653
      tendon_slack_length=0.1038827 pennation_angle_at_optimal=0.1745329
    PathPoint P1: pelvis (-0.1202466 0.0002616969 0.02147901)
    PathPoint P2: pelvis (-0.1027609 -0.02407612 0.06004982)
    PathPoint P3: femur_r (-0.01419843 -0.003453671 0.04192373)
  Millard2012EquilibriumMuscle rect_fem_r: max_isometric_force=1169 optimal_fiber_length=0.1086304
      tendon_slack_length=0.2953986 pennation_angle_at_optimal=0.08726646
    PathPoint P1: pelvis (-0.02541028 -0.02712925 0.08847523)
    ConditionalPathPoint P2: femur_r (0.0320424 -0.3866193 0.001822771) socket_coordinate=/jointset/knee_r/knee_angle_r
        range=(-2.61799 -1.45997)
    MovingPathPoint P3: tibia_r socket_x_coordinate=/jointset/knee_r/knee_angle_r
        socket_y_coordinate=/jointset/knee_r/knee_angle_r socket_z_coordinate=/jointset/knee_r/knee_angle_r
      x_location: MultiplierFunction: scale=0.9465017
        SimmSpline: x=(-2.0944 -1.99997 -1.5708 -1.45752 -1.39626 -1.0472 -0.698132 -0.526391 -0.349066 -0.174533 0 0.00017453 0.00034907 0.0279253 0.0872665 0.174533 2.0944)
            y=(0.0155805 0.0179938 0.0275081 0.0296564 0.0307615 0.0365695 0.0422074 0.0450902 0.048391 0.0534299 0.0617576 0.0617669 0.0617762 0.0633083 0.066994 0.0733035 0.0573481)
      y_location: MultiplierFunction: scale=0.9465017
        SimmSpline: x=(-2.0944 -1.99997 -1.5708 -1.45752 -1.39626 -1.0472 -0.698132 -0.526391 -0.349066 -0.174533 0 0.00017453 0.00034907 0.0279253 0.0872665 0.174533 2.0944)
            y=(0.0234116 0.0237613 0.0251141 0.0252795 0.0253146 0.0249184 0.0242373 0.0238447 0.0234197 0.0227644 0.020984 0.0209814 0.0209788 0.0205225 0.0191754 0.0159554 -0.0673774)
      z_location: MultiplierFunction: scale=0.9465017
        SimmSpline: x=(-2.0944 0.1745) y=(0.0014 0.0014)
  Millard2012EquilibriumMuscle vas_med_r: max_isometric_force=1294 optimal_fiber_length=0.08545093
      tendon_slack_length=0.1209755 pennation_angle_at_optimal=0.08726646
    PathPoint P1: femur_r (0.01343094 -0.2013682 0.01803584)
    PathPoint P2: femur_r (0.03415297 -0.2656449 0.0008634179)
    ConditionalPathPoint P3: femur_r (0.03549607 -0.3883462 -0.01199191)
        socket_coordinate=/jointset/knee_r/knee_angle_r range=(-2.61799 -1.21004)
    ConditionalPathPoint P4: femur_r (0.02628628 -0.4082048 -0.01256753)
        socket_coordinate=/jointset/knee_r/knee_angle_r range=(-2.61799 -1.78006)
    MovingPathPoint P5: tibia_r socket_x_coordinate=/jointset/knee_r/knee_angle_r
        socket_y_coordinate=/jointset/knee_r/knee_angle_r socket_z_coordinate=/jointset/knee_r/knee_angle_r
      x_location: MultiplierFunction: scale=0.9465017
        SimmSpline: x=(-2.0944 -1.99997 -1.5708 -1.45752 -1.39626 -1.0472 -0.698132 -0.526391 -0.349066 -0.174533 0 0.00017453 0.00034907 0.0279253 0.0872665 0.174533 2.0944)
            y=(0.00981097 0.0122243 0.0217371 0.0238851 0.0249902 0.0307959 0.0364187 0.0392871 0.0425654 0.0475764 0.0559586 0.0559681 0.0559776 0.0575419 0.0613368 0.0679503 0.0629332)
      y_location: MultiplierFunction: scale=0.9465017
        SimmSpline: x=(-2.0944 -1.99997 -1.5708 -1.45752 -1.39626 -1.0472 -0.698132 -0.526391 -0.349066 -0.174533 0 0.00017453 0.00034907 0.0279253 0.0872665 0.174533 2.0944)
            y=(0.0224154 0.0227651 0.0241265 0.0242933 0.0243287 0.0239462 0.0233593 0.0230677 0.0228342 0.0226362 0.0217917 0.0217903 0.0217889 0.0215365 0.0206842 0.0183269 -0.0656205)
      z_location: MultiplierFunction: scale=0.9465017
        SimmSpline: x=(-2.0944 2.0944) y=(-0.0146 -0.0146)
  Millard2012EquilibriumMuscle vas_int_r: max_isometric_force=1365 optimal_fiber_length=0.08358276
      tendon_slack_length=0.1306581 pennation_angle_at_optimal=0.05235988
    PathPoint P1: femur_r (0.02782124 -0.1845796 0.02973995)
    PathPoint P2: femur_r (0.03213833 -0.1999292 0.02734157)
    ConditionalPathPoint P3: femur_r (0.03290581 -0.3866193 0.005276442)
        socket_coordinate=/jointset/knee_r/knee_angle_r range=(-2.61799 -1.42)
    MovingPathPoint P4: tibia_r socket_x_coordinate=/jointset/knee_r/knee_angle_r
        socket_y_coordinate=/jointset/knee_r/knee_angle_r socket_z_coordinate=/jointset/knee_r/knee_angle_r
      x_location: MultiplierFunction: scale=0.9465017
        SimmSpline: x=(-2.0944 -1.99997 -1.5708 -1.45752 -1.39626 -1.0472 -0.698132 -0.526391 -0.349066 -0.174533 0 0.00017453 0.00034907 0.0279253 0.0872665 0.174533 2.0944)
            y=(0.0082733 0.0106866 0.0202042 0.022353 0.0234583 0.0292715 0.0349465 0.037871 0.0412569 0.0465287 0.0554632 0.0554735 0.0554837 0.0571717 0.061272 0.0684368 0.0648818)
      y_location: MultiplierFunction: scale=0.9465017
        SimmSpline: x=(-2.0944 -1.99997 -1.5708 -1.45752 -1.39626 -1.0472 -0.698132 -0.526391 -0.349066 -0.174533 0 0.00017453 0.00034907 0.0279253 0.0872665 0.174533 2.0944)
            y=(0.025599 0.0259487 0.0273124 0.0274796 0.0275151 0.0271363 0.0265737 0.0263073 0.0261187 0.0260129 0.0252923 0.0252911 0.0252898 0.0250526 0.0242191 0.0218288 -0.0685706)
      z_location: MultiplierFunction: scale=0.9465017
        SimmSpline: x=(-2.0944 2.0944) y=(0.0018 0.0018)
  Millard2012EquilibriumMuscle vas_lat_r: max_isometric_force=1871 optimal_fiber_length=0.08063007
      tendon_slack_length=0.1507014 pennation_angle_at_optimal=0.08726646
    PathPoint P1: femur_r (0.004604895 -0.1778641 0.03348143)
    PathPoint P2: femur_r (0.0258066 -0.2485684 0.03923754)
    ConditionalPathPoint P3: femur_r (0.03463265 -0.3866193 0.01966674) socket_coordinate=/jointset/knee_r/knee_angle_r
        range=(-2.61799 -1.21004)
    ConditionalPathPoint P4: femur_r (0.02427164 -0.4070536 0.0176521) socket_coordinate=/jointset/knee_r/knee_angle_r
        range=(-2.61799 -1.92004)
    MovingPathPoint P5: tibia_r socket_x_coordinate=/jointset/knee_r/knee_angle_r
        socket_y_coordinate=/jointset/knee_r/knee_angle_r socket_z_coordinate=/jointset/knee_r/knee_angle_r
      x_location: MultiplierFunction: scale=0.9465017
        SimmSpline: x=(-2.0944 -1.99997 -1.5708 -1.45752 -1.39626 -1.0472 -0.698132 -0.526391 -0.349066 -0.174533 0 0.00017453 0.00034907 0.0279253 0.0872665 0.174533 2.0944)
            y=(0.0142897 0.016703 0.0262145 0.0283623 0.0294674 0.0352709 0.0408785 0.0437291 0.0469704 0.0518742 0.0599557 0.0599647 0.0599738 0.0614577 0.0650351 0.0711867 0.0583766)
      y_location: MultiplierFunction: scale=0.9465017
        SimmSpline: x=(-2.0944 -1.99997 -1.5708 -1.45752 -1.39626 -1.0472 -0.698132 -0.526391 -0.349066 -0.174533 0 0.00017453 0.00034907 0.0279253 0.0872665 0.174533 2.0944)
            y=(0.0215318 0.0218815 0.0232362 0.0234019 0.0234371 0.0230439 0.0223842 0.0220151 0.0216359 0.0210971 0.0195864 0.0195842 0.019582 0.01919 0.018008 0.0151073 -0.0653421)
      z_location: MultiplierFunction: scale=0.9465017
        SimmSpline: x=(-2.0944 2.0944) y=(0.0165 0.0165)
  Millard2012EquilibriumMuscle med_gas_r: max_isometric_force=1558 optimal_fiber_length=0.08537455
      tendon_slack_length=0.3699564 pennation_angle_at_optimal=0.296706
    PathPoint P1: femur_r (-0.01822771 -0.3769299 -0.0225448)
    ConditionalPathPoint P2: femur_r (-0.0287806 -0.3858518 -0.02475131)
        socket_coordinate=/jointset/knee_r/knee_angle_r range=(-0.785398 0.174533)
    PathPoint P3: calcn_r (0 0.03122227 -0.005338001)
  Millard2012EquilibriumMuscle lat_gas_r: max_isometric_force=683 optimal_fiber_length=0.06070259
      tendon_slack_length=0.3604216 pennation_angle_at_optimal=0.1396263
    PathPoint P1: femur_r (-0.02110577 -0.3785608 0.02609441)
    ConditionalPathPoint P2: femur_r (-0.0287806 -0.3854681 0.02628628) socket_coordinate=/jointset/knee_r/knee_angle_r
        range=(-0.785398 0.174533)
    PathPoint P3: calcn_r (0 0.03122227 -0.005338001)
  Millard2012EquilibriumMuscle soleus_r: max_isometric_force=3549 optimal_fiber_length=0.04752044
      tendon_slack_length=0.2376022 pennation_angle_at_optimal=0.4363323
    PathPoint P1: tibia_r (-0.002271604 -0.1450987 0.006720162)
    PathPoint P2: calcn_r (0 0.03122227 -0.005338001)
  Millard2012EquilibriumMuscle tib_post_r: max_isometric_force=1588 optimal_fiber_length=0.02958959
      tendon_slack_length=0.2958959 pennation_angle_at_optimal=0.2094395
    PathPoint P1: tibia_r (-0.008897116 -0.1275884 0.001798353)
    PathPoint P2: tibia_r (-0.01362963 -0.3834279 -0.02167489)
    PathPoint P3: calcn_r (0.04199899 0.03363947 -0.02880506)
    PathPoint P4: calcn_r (0.07775352 0.016014 -0.02830147)
  Millard2012EquilibriumMuscle flex_dig_r: max_isometric_force=310 optimal_fiber_length=0.03315377
      tendon_slack_length=0.3900444 pennation_angle_at_optimal=0.1221731
    PathPoint P1: tibia_r (-0.007855964 -0.1936543 -0.001703703)
    PathPoint P2: tibia_r (-0.01457613 -0.3834279 -0.01855143)
    PathPoint P3: calcn_r (0.04391261 0.03172585 -0.02820076)
    PathPoint P4: calcn_r (0.07130763 0.01772619 -0.02648857)
    PathPoint P5: calcn_r (0.1669888 -0.008158076 0.01168317)
    PathPoint P6: toes_r (-0.001913623 -0.007855925 0.0148054)
    PathPoint P7: toes_r (0.02870434 -0.007150906 0.02165415)
    PathPoint P8: toes_r (0.04441619 -0.006043019 0.02437351)
  Millard2012EquilibriumMuscle flex_hal_r: max_isometric_force=322 optimal_fiber_length=0.04203398
      tendon_slack_length=0.3714631 pennation_angle_at_optimal=0.1745329
    PathPoint P1: tibia_r (-0.007477364 -0.2209135 0.02309464)
    PathPoint P2: tibia_r (-0.01760493 -0.3860781 -0.01646913)
    PathPoint P3: calcn_r (0.03766815 0.02779789 -0.02427279)
    PathPoint P4: calcn_r (0.1045442 0.006848755 -0.02578355)
    PathPoint P5: calcn_r (0.1738375 -0.005338001 -0.02709287)
    PathPoint P6: toes_r (0.01561113 -0.006445887 -0.02669)
    PathPoint P7: toes_r (0.05660295 -0.01027313 -0.01822978)
  Millard2012EquilibriumMuscle tib_ant_r: max_isometric_force=905 optimal_fiber_length=0.09388986
      tendon_slack_length=0.2136473 pennation_angle_at_optimal=0.08726646
    PathPoint P1: tibia_r (0.01694238 -0.1537119 0.01088477)
    PathPoint P2: tibia_r (0.03113991 -0.3739628 -0.01675308)
    PathPoint P3: calcn_r (0.117436 0.01792762 -0.03071868)
  Millard2012EquilibriumMuscle per_brev_r: max_isometric_force=435 optimal_fiber_length=0.04789248
      tendon_slack_length=0.1542138 pennation_angle_at_optimal=0.08726646
    PathPoint P1: tibia_r (-0.006625512 -0.2504444 0.03076131)
    PathPoint P2: tibia_r (-0.01874073 -0.3960163 0.026786)
    PathPoint P3: tibia_r (-0.01362963 -0.4065225 0.0273539)
    PathPoint P4: calcn_r (0.0474377 0.02719359 0.02346706)
    PathPoint P5: calcn_r (0.0681854 0.02205702 0.03454593)
  Millard2012EquilibriumMuscle per_long_r: max_isometric_force=943 optimal_fiber_length=0.0472405
      tendon_slack_length=0.3326117 pennation_angle_at_optimal=0.1745329
    PathPoint P1: tibia_r (0.0004732509 -0.1484115 0.03426336)
    PathPoint P2: tibia_r (-0.01959259 -0.398004 0.02706995)
    PathPoint P3: tibia_r (-0.01533333 -0.4087941 0.0273539)
    PathPoint P4: calcn_r (0.04411404 0.02316491 0.02225845)
    PathPoint P5: calcn_r (0.06858827 0.010676 0.02860363)
    PathPoint P6: calcn_r (0.08581088 0.006949472 0.0118846)
    PathPoint P7: calcn_r (0.1211625 0.008560944 -0.01853193)
  Millard2012EquilibriumMuscle per_tert_r: max_isometric_force=180 optimal_fiber_length=0.0759632
      tendon_slack_length=0.09615596 pennation_angle_at_optimal=0.2268928
    PathPoint P1: tibia_r (0.0009465017 -0.2653991 0.02186419)
    PathPoint P2: tibia_r (0.02167489 -0.3851316 0.01504938)
    PathPoint P3: calcn_r (0.08631446 0.02296347 0.03011438)
  Millard2012EquilibriumMuscle ext_dig_r: max_isometric_force=512 optimal_fiber_length=0.09883464
      tendon_slack_length=0.3342936 pennation_angle_at_optimal=0.1396263
    PathPoint P1: tibia_r (0.003028806 -0.1307119 0.02612345)
    PathPoint P2: tibia_r (0.0273539 -0.3792632 0.006814813)
    PathPoint P3: calcn_r (0.09286107 0.03907819 -0.000100717)
    PathPoint P4: calcn_r (0.1627587 0.005539434 0.01309321)
    PathPoint P5: toes_r (0.000302151 0.004733699 0.0154097)
    PathPoint P6: toes_r (0.04461763 -0.000402868 0.02517925)
  Millard2012EquilibriumMuscle ext_hal_r: max_isometric_force=162 optimal_fiber_length=0.1078733
      tendon_slack_length=0.2964088 pennation_angle_at_optimal=0.1047198
    PathPoint P1: tibia_r (0.001135802 -0.1672469 0.02158024)
    PathPoint P2: tibia_r (0.03085596 -0.3771809 -0.008045265)
    PathPoint P3: calcn_r (0.09769548 0.03917891 -0.02125129)
    PathPoint P4: calcn_r (0.1302271 0.03112155 -0.02588427)
    PathPoint P5: calcn_r (0.1746433 0.01399966 -0.02820076)
    PathPoint P6: toes_r (0.03001366 0.004129397 -0.02467566)
    PathPoint P7: toes_r (0.05670367 0.003424378 -0.01873336)
  Millard2012EquilibriumMuscle glut_med1_l: max_isometric_force=819 optimal_fiber_length=0.04761173
      tendon_slack_length=0.06941524 pennation_angle_at_optimal=0.1396263
    PathPoint P1: pelvis (-0.0351437 0.02651862 -0.1105026)
    PathPoint P2: femur_l (-0.02093193 -0.01123411 -0.05329)
  Millard2012EquilibriumMuscle glut_med2_l: max_isometric_force=573 optimal_fiber_length=0.07563178
      tendon_slack_length=0.04743768 pennation_angle_at_optimal=0
    PathPoint P1: pelvis (-0.07364673 0.03881838 -0.07001243)
    PathPoint P2: femur_l (-0.02477265 -0.005569045 -0.05060149)
  Millard2012EquilibriumMuscle glut_med3_l: max_isometric_force=653 optimal_fiber_length=0.0582774
      tendon_slack_length=0.04781273 pennation_angle_at_optimal=0.3316126
    PathPoint P1: pelvis (-0.105345 0.009159393 -0.05922722)
    PathPoint P2: femur_l (-0.02966957 -0.004512847 -0.04973733)
  Millard2012EquilibriumMuscle glut_min1_l: max_isometric_force=270 optimal_fiber_length=0.06146827
      tendon_slack_length=0.01446312 pennation_angle_at_optimal=0.1745329
    PathPoint P1: pelvis (-0.04022576 -0.006978585 -0.09651844)
    PathPoint P2: femur_l (-0.006913297 -0.009985873 -0.05377009)
  Millard2012EquilibriumMuscle glut_min2_l: max_isometric_force=285 optimal_fiber_length=0.0509453
      tendon_slack_length=0.02365317 pennation_angle_at_optimal=0
    PathPoint P1: pelvis (-0.05452442 -0.0056701 -0.09057744)
    PathPoint P2: femur_l (-0.009217729 -0.009985873 -0.05377009)
  Millard2012EquilibriumMuscle glut_min3_l: max_isometric_force=323 optimal_fiber_length=0.03472509
      tendon_slack_length=0.04660473 pennation_angle_at_optimal=0.01745329
    PathPoint P1: pelvis (-0.07183786 -0.005495636 -0.07823843)
    PathPoint P2: femur_l (-0.01296243 -0.007969495 -0.05280991)
  Millard2012EquilibriumMuscle semimem_l: max_isometric_force=1288 optimal_fiber_length=0.0771442
      tendon_slack_length=0.3461846 pennation_angle_at_optimal=0.2617994
    PathPoint P1: pelvis (-0.1026747 -0.08502534 -0.06536017)
    ConditionalPathPoint P2: tibia_l (-0.03273355 -0.03310039 0.01778711)
        socket_coordinate=/jointset/knee_l/knee_angle_l range=(-0.558505 0.174533)
    PathPoint P3: tibia_l (-0.02539672 -0.04487694 0.01840792)
  Millard2012EquilibriumMuscle semiten_l: max_isometric_force=410 optimal_fiber_length=0.1936866
      tendon_slack_length=0.2462036 pennation_angle_at_optimal=0.08726646
    PathPoint P1: pelvis (-0.1088335 -0.09585087 -0.05519648)
    ConditionalPathPoint P2: tibia_l (-0.03953422 -0.0268923 0.0214179) socket_coordinate=/jointset/knee_l/knee_angle_l
        range=(-0.331613 0.174533)
    PathPoint P3: tibia_l (-0.03124737 -0.0496835 0.02152137)
    PathPoint P4: tibia_l (-0.010629 -0.07017019 0.02304517)
    PathPoint P5: tibia_l (0.002539672 -0.08992319 0.01815395)
  Millard2012EquilibriumMuscle bifemlh_l: max_isometric_force=896 optimal_fiber_length=0.105101
      tendon_slack_length=0.3143388 pennation_angle_at_optimal=0
    PathPoint P1: pelvis (-0.1084976 -0.08947419 -0.06346818)
    PathPoint P2: tibia_l (-0.02831264 -0.03386229 -0.02768242)
    PathPoint P3: tibia_l (-0.02201049 -0.05295686 -0.03226324)
  Millard2012EquilibriumMuscle bifemsh_l: max_isometric_force=804 optimal_fiber_length=0.16524
      tendon_slack_length=0.08500788 pennation_angle_at_optimal=0.4014257
    PathPoint P1: femur_l (0.004800901 -0.202694 -0.02246822)
    PathPoint P2: tibia_l (-0.02831264 -0.03386229 -0.02768242)
    PathPoint P3: tibia_l (-0.02201049 -0.05295686 -0.03226324)
  Millard2012EquilibriumMuscle sar_l: max_isometric_force=156 optimal_fiber_length=0.4915573
      tendon_slack_length=0.09453025 pennation_angle_at_optimal=0
    PathPoint P1: pelvis (-0.01317889 -0.00113402 -0.1135188)
    PathPoint P2: femur_l (-0.00288054 -0.3425923 0.04042358)
    PathPoint P3: tibia_l (-0.005267467 -0.03941194 0.0375307)
    PathPoint P4: tibia_l (0.005643715 -0.05540247 0.03602571)
    PathPoint P5: tibia_l (0.02285704 -0.07901201 0.0237036)
  Millard2012EquilibriumMuscle add_long_l: max_isometric_force=627 optimal_fiber_length=0.1322183
      tendon_slack_length=0.1053914 pennation_angle_at_optimal=0.1047198
    PathPoint P1: pelvis (-0.02721914 -0.07292622 -0.01544661)
    PathPoint P2: femur_l (0.004800901 -0.202694 -0.02246822)
  Millard2012EquilibriumMuscle add_brev_l: max_isometric_force=429 optimal_fiber_length=0.1270219
      tendon_slack_length=0.01910104 pennation_angle_at_optimal=0
    PathPoint P1: pelvis (-0.05056214 -0.07981757 -0.01498961)
    PathPoint P2: femur_l (0.0008641621 -0.1148375 -0.0282293)
  Millard2012EquilibriumMuscle add_mag1_l: max_isometric_force=381 optimal_fiber_length=0.08407782
      tendon_slack_length=0.05798471 pennation_angle_at_optimal=0.08726646
    PathPoint P1: pelvis (-0.06305194 -0.1024107 -0.02330701)
    PathPoint P2: femur_l (-0.004320811 -0.1162778 -0.03255011)
  Millard2012EquilibriumMuscle add_mag2_l: max_isometric_force=343 optimal_fiber_length=0.118231
      tendon_slack_length=0.1172539 pennation_angle_at_optimal=0.05235988
    PathPoint P1: pelvis (-0.07157945 -0.1039809 -0.02815121)
    PathPoint P2: femur_l (0.005184973 -0.2194012 -0.02179609)
  Millard2012EquilibriumMuscle add_mag3_l: max_isometric_force=488 optimal_fiber_length=0.127181
      tendon_slack_length=0.2417409 pennation_angle_at_optimal=0.08726646
    PathPoint P1: pelvis (-0.09568045 -0.09955824 -0.0446215)
    PathPoint P2: femur_l (0.006721261 -0.3684211 0.02554079)
  Millard2012EquilibriumMuscle tfl_l: max_isometric_force=233 optimal_fiber_length=0.08972156
      tendon_slack_length=0.4013859 pennation_angle_at_optimal=0.05235988
    PathPoint P1: pelvis (-0.02678846 0.01866772 -0.1134274)
    PathPoint P2: femur_l (0.0282293 -0.09553792 -0.05732275)
    PathPoint P3: femur_l (0.005184973 -0.3887769 -0.03427843)
    PathPoint P4: tibia_l (0.005643715 -0.04580815 -0.02793639)
  Millard2012EquilibriumMuscle pect_l: max_isometric_force=266 optimal_fiber_length=0.09462876
      tendon_slack_length=0.03122749 pennation_angle_at_optimal=0
    PathPoint P1: pelvis (-0.03712484 -0.06699442 -0.04122142)
    PathPoint P2: femur_l (-0.0117142 -0.07892681 -0.02429256)
  Millard2012EquilibriumMuscle grac_l: max_isometric_force=162 optimal_fiber_length=0.3400904
      tendon_slack_length=0.1217369 pennation_angle_at_optimal=0.05235988
    PathPoint P1: pelvis (-0.06374964 -0.1035448 -0.02553717)
    ConditionalPathPoint P2: tibia_l (-0.02499225 -0.03000575 0.03549897)
        socket_coordinate=/jointset/knee_l/knee_angle_l range=(-0.436332 0.174533)
    PathPoint P3: tibia_l (-0.01827623 -0.0484701 0.03367416)
    PathPoint P4: tibia_l (0.005643715 -0.07863576 0.02144612)
  Millard2012EquilibriumMuscle glut_max1_l: max_isometric_force=573 optimal_fiber_length=0.1282816
      tendon_slack_length=0.1129239 pennation_angle_at_optimal=0.08726646
    PathPoint P1: pelvis (-0.1029331 0.05338618 -0.06398003)
    PathPoint P2: pelvis (-0.1112023 0.001046788 -0.08098043)
    PathPoint P3: femur_l (-0.04388023 -0.02381247 -0.03763906)
    PathPoint P4: femur_l (-0.02659699 -0.0543462 -0.04512847)
  Millard2012EquilibriumMuscle glut_max2_l: max_isometric_force=819 optimal_fiber_length=0.1347672
      tendon_slack_length=0.1164315 pennation_angle_at_optimal=0
    PathPoint P1: pelvis (-0.1161982 0.01535289 -0.05145822)
    PathPoint P2: pelvis (-0.1185239 -0.0453608 -0.08353963)
    PathPoint P3: femur_l (-0.04090367 -0.05088955 -0.02813328)
    PathPoint P4: femur_l (-0.01497881 -0.0975543 -0.04023155)
  Millard2012EquilibriumMuscle glut_max3_l: max_isometric_force=552 optimal_fiber_length=0.1325794
      tendon_slack_length=0.1335001 pennation_angle_at_optimal=0.08726646
    PathPoint P1: pelvis (-0.1340284 -0.02739095 -0.005301202)
    PathPoint P2: pelvis (-0.1317027 -0.0917684 -0.03683421)
    PathPoint P3: femur_l (-0.02870939 -0.09995475 -0.01296243)
    PathPoint P4: femur_l (-0.005761081 -0.1362496 -0.0394634)
  Millard2012EquilibriumMuscle iliacus_l: max_isometric_force=1073 optimal_fiber_length=0.08964919
      tendon_slack_length=0.08964919 pennation_angle_at_optimal=0.1221731
    PathPoint P1: pelvis (-0.05805602 0.0318398 -0.07805563)
    PathPoint P2: pelvis (-0.02222322 -0.04797777 -0.07412543)
    ConditionalPathPoint P3: pelvis (-0.02480732 -0.07022201 -0.07458243)
        socket_coordinate=/jointset/hip_l/hip_flexion_l range=(-1.5708 0.785398)
    PathPoint P4: femur_l (0.001632306 -0.05213778 -0.005473027)
    PathPoint P5: femur_l (-0.01853148 -0.05962719 -0.01238632)
  Millard2012EquilibriumMuscle psoas_l: max_isometric_force=1113 optimal_fiber_length=0.08925164
      tendon_slack_length=0.1428026 pennation_angle_at_optimal=0.1396263
    PathPoint P1: pelvis (-0.05573033 0.07737506 -0.02641461)
    PathPoint P2: pelvis (-0.02050049 -0.04972242 -0.06937263)
    ConditionalPathPoint P3: pelvis (-0.02480732 -0.07022201 -0.07458243)
        socket_coordinate=/jointset/hip_l/hip_flexion_l range=(-1.5708 0.785398)
    PathPoint P4: femur_l (0.001536288 -0.04868113 -0.003648685)
    PathPoint P5: femur_l (-0.01805139 -0.05732275 -0.009985873)
  Millard2012EquilibriumMuscle quad_fem_l: max_isometric_force=381 optimal_fiber_length=0.05004719
      tendon_slack_length=0.02224319 pennation_angle_at_optimal=0
    PathPoint P1: pelvis (-0.09845405 -0.1004044 -0.04752802)
    PathPoint P2: femur_l (-0.03658286 -0.03447047 -0.03514259)
  Millard2012EquilibriumMuscle gem_l: max_isometric_force=164 optimal_fiber_length=0.02210929
      tendon_slack_length=0.0359276 pennation_angle_at_optimal=0
    PathPoint P1: pelvis (-0.09759268 -0.0715305 -0.06525963)
    PathPoint P2: femur_l (-0.01363456 -0.003168594 -0.04253598)
  Millard2012EquilibriumMuscle peri_l: max_isometric_force=444 optimal_fiber_length=0.02349134
      tendon_slack_length=0.103904 pennation_angle_at_optimal=0.1745329
    PathPoint P1: pelvis (-0.1202466 0.0002616969 -0.02147901)
    PathPoint P2: pelvis (-0.1027609 -0.02407612 -0.06004982)
    PathPoint P3: femur_l (-0.01421067 -0.003456648 -0.04195987)
  Millard2012EquilibriumMuscle rect_fem_l: max_isometric_force=1169 optimal_fiber_length=0.1087507
      tendon_slack_length=0.2957257 pennation_angle_at_optimal=0.08726646
    PathPoint P1: pelvis (-0.02541028 -0.02712925 -0.08847523)
    ConditionalPathPoint P2: femur_l (0.03207002 -0.3869526 -0.001824342)
        socket_coordinate=/jointset/knee_l/knee_angle_l range=(-2.61799 -1.45997)
    MovingPathPoint P3: tibia_l socket_x_coordinate=/jointset/knee_l/knee_angle_l
        socket_y_coordinate=/jointset/knee_l/knee_angle_l socket_z_coordinate=/jointset/knee_l/knee_angle_l
      x_location: MultiplierFunction: scale=0.9406191
        SimmSpline: x=(-2.0944 -1.99997 -1.5708 -1.45752 -1.39626 -1.0472 -0.698132 -0.526391 -0.349066 -0.174533 0 0.00017453 0.00034907 0.0279253 0.0872665 0.174533 2.0944)
            y=(0.0155805 0.0179938 0.0275081 0.0296564 0.0307615 0.0365695 0.0422074 0.0450902 0.048391 0.0534299 0.0617576 0.0617669 0.0617762 0.0633083 0.066994 0.0733035 0.0573481)
      y_location: MultiplierFunction: scale=0.9406191
        SimmSpline: x=(-2.0944 -1.99997 -1.5708 -1.45752 -1.39626 -1.0472 -0.698132 -0.526391 -0.349066 -0.174533 0 0.00017453 0.00034907 0.0279253 0.0872665 0.174533 2.0944)
            y=(0.0234116 0.0237613 0.0251141 0.0252795 0.0253146 0.0249184 0.0242373 0.0238447 0.0234197 0.0227644 0.020984 0.0209814 0.0209788 0.0205225 0.0191754 0.0159554 -0.0673774)
      z_location: MultiplierFunction: scale=0.9406191
        SimmSpline: x=(-2.0944 0.1745) y=(-0.0014 -0.0014)
  Millard2012EquilibriumMuscle vas_med_l: max_isometric_force=1294 optimal_fiber_length=0.0855616
      tendon_slack_length=0.1211321 pennation_angle_at_optimal=0.08726646
    PathPoint P1: femur_l (0.01344252 -0.2015418 -0.01805139)
    PathPoint P2: femur_l (0.03418241 -0.2658739 -0.0008641621)
    ConditionalPathPoint P3: femur_l (0.03552666 -0.3886809 0.01200225) socket_coordinate=/jointset/knee_l/knee_angle_l
        range=(-2.61799 -1.21004)
    ConditionalPathPoint P4: femur_l (0.02630894 -0.4085566 0.01257836) socket_coordinate=/jointset/knee_l/knee_angle_l
        range=(-2.61799 -1.78006)
    MovingPathPoint P5: tibia_l socket_x_coordinate=/jointset/knee_l/knee_angle_l
        socket_y_coordinate=/jointset/knee_l/knee_angle_l socket_z_coordinate=/jointset/knee_l/knee_angle_l
      x_location: MultiplierFunction: scale=0.9406191
        SimmSpline: x=(-2.0944 -1.99997 -1.5708 -1.45752 -1.39626 -1.0472 -0.698132 -0.526391 -0.349066 -0.174533 0 0.00017453 0.00034907 0.0279253 0.0872665 0.174533 2.0944)
            y=(0.00981097 0.0122243 0.0217371 0.0238851 0.0249902 0.0307959 0.0364187 0.0392871 0.0425654 0.0475764 0.0559586 0.0559681 0.0559776 0.0575419 0.0613368 0.0679503 0.0629332)
      y_location: MultiplierFunction: scale=0.9406191
        SimmSpline: x=(-2.0944 -1.99997 -1.5708 -1.45752 -1.39626 -1.0472 -0.698132 -0.526391 -0.349066 -0.174533 0 0.00017453 0.00034907 0.0279253 0.0872665 0.174533 2.0944)
            y=(0.0224154 0.0227651 0.0241265 0.0242933 0.0243287 0.0239462 0.0233593 0.0230677 0.0228342 0.0226362 0.0217917 0.0217903 0.0217889 0.0215365 0.0206842 0.0183269 -0.0656205)
      z_location: MultiplierFunction: scale=0.9406191
        SimmSpline: x=(-2.0944 2.0944) y=(0.0146 0.0146)
  Millard2012EquilibriumMuscle vas_int_l: max_isometric_force=1365 optimal_fiber_length=0.08371751
      tendon_slack_length=0.1308687 pennation_angle_at_optimal=0.05235988
    PathPoint P1: femur_l (0.02784522 -0.1847387 -0.02976558)
    PathPoint P2: femur_l (0.03216603 -0.2001015 -0.02736513)
    ConditionalPathPoint P3: femur_l (0.03293418 -0.3869526 -0.005280991)
        socket_coordinate=/jointset/knee_l/knee_angle_l range=(-2.61799 -1.42)
    MovingPathPoint P4: tibia_l socket_x_coordinate=/jointset/knee_l/knee_angle_l
        socket_y_coordinate=/jointset/knee_l/knee_angle_l socket_z_coordinate=/jointset/knee_l/knee_angle_l
      x_location: MultiplierFunction: scale=0.9406191
        SimmSpline: x=(-2.0944 -1.99997 -1.5708 -1.45752 -1.39626 -1.0472 -0.698132 -0.526391 -0.349066 -0.174533 0 0.00017453 0.00034907 0.0279253 0.0872665 0.174533 2.0944)
            y=(0.0082733 0.0106866 0.0202042 0.022353 0.0234583 0.0292715 0.0349465 0.037871 0.0412569 0.0465287 0.0554632 0.0554735 0.0554837 0.0571717 0.061272 0.0684368 0.0648818)
      y_location: MultiplierFunction: scale=0.9406191
        SimmSpline: x=(-2.0944 -1.99997 -1.5708 -1.45752 -1.39626 -1.0472 -0.698132 -0.526391 -0.349066 -0.174533 0 0.00017453 0.00034907 0.0279253 0.0872665 0.174533 2.0944)
            y=(0.025599 0.0259487 0.0273124 0.0274796 0.0275151 0.0271363 0.0265737 0.0263073 0.0261187 0.0260129 0.0252923 0.0252911 0.0252898 0.0250526 0.0242191 0.0218288 -0.0685706)
      z_location: MultiplierFunction: scale=0.9406191
        SimmSpline: x=(-2.0944 2.0944) y=(-0.0018 -0.0018)
  Millard2012EquilibriumMuscle vas_lat_l: max_isometric_force=1871 optimal_fiber_length=0.08072368
      tendon_slack_length=0.1508764 pennation_angle_at_optimal=0.08726646
    PathPoint P1: femur_l (0.004608865 -0.1780174 -0.03351029)
    PathPoint P2: femur_l (0.02582885 -0.2487827 -0.03927137)
    ConditionalPathPoint P3: femur_l (0.0346625 -0.3869526 -0.01968369) socket_coordinate=/jointset/knee_l/knee_angle_l
        range=(-2.61799 -1.21004)
    ConditionalPathPoint P4: femur_l (0.02429256 -0.4074044 -0.01766731)
        socket_coordinate=/jointset/knee_l/knee_angle_l range=(-2.61799 -1.92004)
    MovingPathPoint P5: tibia_l socket_x_coordinate=/jointset/knee_l/knee_angle_l
        socket_y_coordinate=/jointset/knee_l/knee_angle_l socket_z_coordinate=/jointset/knee_l/knee_angle_l
      x_location: MultiplierFunction: scale=0.9406191
        SimmSpline: x=(-2.0944 -1.99997 -1.5708 -1.45752 -1.39626 -1.0472 -0.698132 -0.526391 -0.349066 -0.174533 0 0.00017453 0.00034907 0.0279253 0.0872665 0.174533 2.0944)
            y=(0.0142897 0.016703 0.0262145 0.0283623 0.0294674 0.0352709 0.0408785 0.0437291 0.0469704 0.0518742 0.0599557 0.0599647 0.0599738 0.0614577 0.0650351 0.0711867 0.0583766)
      y_location: MultiplierFunction: scale=0.9406191
        SimmSpline: x=(-2.0944 -1.99997 -1.5708 -1.45752 -1.39626 -1.0472 -0.698132 -0.526391 -0.349066 -0.174533 0 0.00017453 0.00034907 0.0279253 0.0872665 0.174533 2.0944)
            y=(0.0215318 0.0218815 0.0232362 0.0234019 0.0234371 0.0230439 0.0223842 0.0220151 0.0216359 0.0210971 0.0195864 0.0195842 0.019582 0.01919 0.018008 0.0151073 -0.0653421)
      z_location: MultiplierFunction: scale=0.9406191
        SimmSpline: x=(-2.0944 2.0944) y=(-0.0165 -0.0165)
  Millard2012EquilibriumMuscle med_gas_l: max_isometric_force=1558 optimal_fiber_length=0.08482577
      tendon_slack_length=0.3675783 pennation_angle_at_optimal=0.296706
    PathPoint P1: femur_l (-0.01824342 -0.3772548 0.02256423)
    ConditionalPathPoint P2: femur_l (-0.0288054 -0.3861844 0.02477265) socket_coordinate=/jointset/knee_l/knee_angle_l
        range=(-0.785398 0.174533)
    PathPoint P3: calcn_l (0 0.03069849 0.005248452)
  Millard2012EquilibriumMuscle lat_gas_l: max_isometric_force=683 optimal_fiber_length=0.06030931
      tendon_slack_length=0.3580865 pennation_angle_at_optimal=0.1396263
    PathPoint P1: femur_l (-0.02112396 -0.3788871 -0.0261169)
    ConditionalPathPoint P2: femur_l (-0.0288054 -0.3858004 -0.02630894)
        socket_coordinate=/jointset/knee_l/knee_angle_l range=(-0.785398 0.174533)
    PathPoint P3: calcn_l (0 0.03069849 0.005248452)
  Millard2012EquilibriumMuscle soleus_l: max_isometric_force=3549 optimal_fiber_length=0.04719049
      tendon_slack_length=0.2359525 pennation_angle_at_optimal=0.4363323
    PathPoint P1: tibia_l (-0.002257486 -0.1441969 -0.006678396)
    PathPoint P2: calcn_l (0 0.03069849 0.005248452)
  Millard2012EquilibriumMuscle tib_post_l: max_isometric_force=1588 optimal_fiber_length=0.02936183
      tendon_slack_length=0.2936183 pennation_angle_at_optimal=0.2094395
    PathPoint P1: tibia_l (-0.00884182 -0.1267955 -0.001787176)
    PathPoint P2: tibia_l (-0.01354492 -0.3810448 0.02154018)
    PathPoint P3: calcn_l (0.04129443 0.03307515 0.02832184)
    PathPoint P4: calcn_l (0.07644915 0.01574536 0.0278267)
  Millard2012EquilibriumMuscle flex_dig_l: max_isometric_force=310 optimal_fiber_length=0.03277691
      tendon_slack_length=0.3856107 pennation_angle_at_optimal=0.1221731
    PathPoint P1: tibia_l (-0.007807139 -0.1924507 0.001693114)
    PathPoint P2: tibia_l (-0.01448553 -0.3810448 0.01843613)
    PathPoint P3: calcn_l (0.04317595 0.03119363 0.02772767)
    PathPoint P4: calcn_l (0.0701114 0.01742882 0.02604421)
    PathPoint P5: calcn_l (0.1641874 -0.008021219 -0.01148718)
    PathPoint P6: toes_l (-0.001881521 -0.007724137 -0.01455703)
    PathPoint P7: toes_l (0.02822281 -0.007030945 -0.02129089)
    PathPoint P8: toes_l (0.04367108 -0.005941644 -0.02396463)
  Millard2012EquilibriumMuscle flex_hal_l: max_isometric_force=322 optimal_fiber_length=0.04153844
      tendon_slack_length=0.3670839 pennation_angle_at_optimal=0.1745329
    PathPoint P1: tibia_l (-0.007430891 -0.2195405 -0.02295111)
    PathPoint P2: tibia_l (-0.01749552 -0.3836785 0.01636677)
    PathPoint P3: calcn_l (0.03703625 0.02733156 0.0238656)
    PathPoint P4: calcn_l (0.1027904 0.006733863 0.02535101)
    PathPoint P5: calcn_l (0.1709213 -0.005248452 0.02663837)
    PathPoint P6: toes_l (0.01534925 -0.006337753 0.02624226)
    PathPoint P7: toes_l (0.0556534 -0.01010079 0.01792396)
  Millard2012EquilibriumMuscle tib_ant_l: max_isometric_force=905 optimal_fiber_length=0.09310479
      tendon_slack_length=0.2118609 pennation_angle_at_optimal=0.08726646
    PathPoint P1: tibia_l (0.01683708 -0.1527565 -0.01081712)
    PathPoint P2: tibia_l (0.03094637 -0.3716386 0.01664896)
    PathPoint P3: calcn_l (0.1154659 0.01762688 0.03020336)
  Millard2012EquilibriumMuscle per_brev_l: max_isometric_force=435 optimal_fiber_length=0.0474923
      tendon_slack_length=0.1529252 pennation_angle_at_optimal=0.08726646
    PathPoint P1: tibia_l (-0.006584334 -0.2488878 -0.03057012)
    PathPoint P2: tibia_l (-0.01862426 -0.393555 -0.02661952)
    PathPoint P3: tibia_l (-0.01354492 -0.4039959 -0.02718389)
    PathPoint P4: calcn_l (0.0466419 0.0267374 -0.02307338)
    PathPoint P5: calcn_l (0.06704155 0.021687 -0.0339664)
  Millard2012EquilibriumMuscle per_long_l: max_isometric_force=943 optimal_fiber_length=0.04679412
      tendon_slack_length=0.3294688 pennation_angle_at_optimal=0.1745329
    PathPoint P1: tibia_l (0.0004703096 -0.1474891 -0.03405041)
    PathPoint P2: tibia_l (-0.01947082 -0.3955303 -0.02690171)
    PathPoint P3: tibia_l (-0.01523803 -0.4062534 -0.02718389)
    PathPoint P4: calcn_l (0.043374 0.0227763 -0.02188505)
    PathPoint P5: calcn_l (0.06743766 0.0104969 -0.02812378)
    PathPoint P6: calcn_l (0.08437134 0.00683289 -0.01168523)
    PathPoint P7: calcn_l (0.11913 0.008417329 0.01822104)
  Millard2012EquilibriumMuscle per_tert_l: max_isometric_force=180 optimal_fiber_length=0.07527965
      tendon_slack_length=0.09529069 pennation_angle_at_optimal=0.2268928
    PathPoint P1: tibia_l (0.0009406191 -0.2637496 -0.0217283)
    PathPoint P2: tibia_l (0.02154018 -0.3827379 -0.01495584)
    PathPoint P3: calcn_l (0.08486648 0.02257825 -0.02960919)
  Millard2012EquilibriumMuscle ext_dig_l: max_isometric_force=512 optimal_fiber_length=0.09781604
      tendon_slack_length=0.3308484 pennation_angle_at_optimal=0.1396263
    PathPoint P1: tibia_l (0.003009981 -0.1298995 -0.02596109)
    PathPoint P2: tibia_l (0.02718389 -0.3769061 -0.006772458)
    PathPoint P3: calcn_l (0.09130326 0.03842263 9.90274e-5)
    PathPoint P4: calcn_l (0.1600283 0.005446507 -0.01287356)
    PathPoint P5: toes_l (0.0002970822 0.004654288 -0.01515119)
    PathPoint P6: toes_l (0.04386914 -0.0003961096 -0.02475685)
  Millard2012EquilibriumMuscle ext_hal_l: max_isometric_force=162 optimal_fiber_length=0.1067064
      tendon_slack_length=0.2932023 pennation_angle_at_optimal=0.1047198
    PathPoint P1: tibia_l (0.001128743 -0.1662074 -0.02144612)
    PathPoint P2: tibia_l (0.03066418 -0.3748367 0.007995263)
    PathPoint P3: calcn_l (0.09605658 0.03852166 0.02089478)
    PathPoint P4: calcn_l (0.1280424 0.03059947 0.02545004)
    PathPoint P5: calcn_l (0.1717135 0.01376481 0.02772767)
    PathPoint P6: toes_l (0.02951016 0.004060123 0.02426171)
    PathPoint P7: toes_l (0.05575243 0.003366932 0.0184191)
  Millard2012EquilibriumMuscle ercspn_r: max_isometric_force=2500 optimal_fiber_length=0.1013931
      tendon_slack_length=0.02534826 pennation_angle_at_optimal=0
    PathPoint P1: pelvis (-0.1205911 0.03829499 0.03985042)
    PathPoint P2: torso (-0.05034517 0.09173054 0.0249788)
  Millard2012EquilibriumMuscle ercspn_l: max_isometric_force=2500 optimal_fiber_length=0.1013931
      tendon_slack_length=0.02534826 pennation_angle_at_optimal=0
    PathPoint P1: pelvis (-0.1205911 0.03829499 -0.03985042)
    PathPoint P2: torso (-0.05034517 0.09173054 -0.0249788)
  Millard2012EquilibriumMuscle intobl_r: max_isometric_force=900 optimal_fiber_length=0.08532056
      tendon_slack_length=0.08532056 pennation_angle_at_optimal=0
    PathPoint P1: pelvis (-0.03445461 0.06106262 0.1057498)
    PathPoint P2: torso (0.06407567 0.1334262 0.01554697)
  Millard2012EquilibriumMuscle intobl_l: max_isometric_force=900 optimal_fiber_length=0.08532056
      tendon_slack_length=0.08532056 pennation_angle_at_optimal=0
    PathPoint P1: pelvis (-0.03445461 0.06106262 -0.1057498)
    PathPoint P2: torso (0.06407567 0.1334262 -0.01554697)
  Millard2012EquilibriumMuscle extobl_r: max_isometric_force=900 optimal_fiber_length=0.1060464
      tendon_slack_length=0.1237208 pennation_angle_at_optimal=0
    PathPoint P1: pelvis (-0.02584096 -0.05547975 0.009140004)
    PathPoint P2: torso (0.05949884 0.09173054 0.1140111)
  Millard2012EquilibriumMuscle extobl_l: max_isometric_force=900 optimal_fiber_length=0.1060464
      tendon_slack_length=0.1237208 pennation_angle_at_optimal=0
    PathPoint P1: pelvis (-0.02584096 -0.05547975 -0.009140004)
    PathPoint P2: torso (0.05949884 0.09173054 -0.1140111)
