# OpenSim document version 40000
MarkerSet:
  Marker STRN: torso (0.0904946 0.1993705 -0.0006675251)
  Marker RSHO: torso (-0.0005036911 0.3547151 0.1629845)
  Marker LSHO: torso (-0.008139611 0.3476243 -0.1704226)
  Marker RASI: pelvis (-0.00623736 0.01616328 0.1036144)
  Marker LASI: pelvis (0.00663064 0.01598353 -0.09896945)
  Marker RTHI: femur_r (0.01121036 -0.3033523 0.1093248)
  Marker RKNE: femur_r (0.00312447 -0.3822569 0.06311821)
  Marker RTIB: tibia_r (-0.02223545 -0.1864048 0.09467481)
  Marker RANK: tibia_r (-0.01293697 -0.3999528 0.0285885)
  Marker RHEE: calcn_r (0.009314237 0.01343152 -0.03125961)
  Marker RTOE: calcn_r (0.1983021 0.01868069 0.03913518)
  Marker LTHI: femur_l (0.002835495 -0.2934805 -0.1032061)
  Marker LKNE: femur_l (-0.0009859964 -0.3831158 -0.06184616)
  Marker LTIB: tibia_l (-0.01906935 -0.1712512 -0.10344)
  Marker LANK: tibia_l (-0.01130884 -0.3979005 -0.03110499)
  Marker LHEE: calcn_l (-0.003303687 0.01241513 0.01711351)
  Marker LTOE: calcn_l (0.1903494 0.02013403 -0.0251268)
  Marker CLAV: torso (0.04110618 0.3439259 0.004840444)
  Marker C7: torso (-0.08018073 0.3953326 0.003082862)
  Marker T10: torso (-0.08095871 0.1215023 0.002891895)
  Marker RPSI: pelvis (-0.150661 0.05035292 0.05454293)
  Marker LPSI: pelvis (-0.1452965 0.05196959 -0.05270289)
  Marker RHJC: femur_r (-0.0001425539 0.0004986878 -0.01437698)
  Marker LHJC: femur_l (0.006587579 0.0006883199 0.01176088)
  Marker RKJC: tibia_r (-0.0001330525 -0.005911696 0.0100014)
  Marker LKJC: tibia_l (0.001380601 -0.005795466 -0.008200667)
  Marker RAJC: talus_r (-0.004520556 0.008966073 -0.009262459)
  Marker LAJC: talus_l (-0.003754087 0.008469857 0.009475256)
