# OpenSim document version 30000
ScaleTool model_scaled:
  results_directory: .
  mass: 41.5 [kg]
  height: 1610
  age: 15
  notes: male
  GenericModelMaker:
    model_file: ../model/model_generic.osim
    marker_set_file: markers.xml
  ModelScaler:
    apply: true
    scaling_order: measurements manualScale
    marker_file: ../experimental_data/static.trc
    time_range: 0 10
    preserve_mass_distribution: true
    output_model_file: model_scaled.osim
    output_scale_file: model_scale_set_applied.xml
    MeasurementSet:
      Measurement thigh_r: apply=true
        MarkerPair: markers=(RHJC RKNE)
        BodyScale femur_r: axes=(X Y Z)
      Measurement thigh_l: apply=true
        MarkerPair: markers=(LHJC LKNE)
        BodyScale femur_l: axes=(X Y Z)
      Measurement shank_r: apply=true
        MarkerPair: markers=(RKNE RAJC)
        BodyScale tibia_r: axes=(X Y Z)
      Measurement shank_l: apply=true
        MarkerPair: markers=(LKNE LAJC)
        BodyScale tibia_l: axes=(X Y Z)
      Measurement foot_r: apply=true
        MarkerPair: markers=(RHEE RTOE)
        BodyScale talus_r: axes=(X Y Z)
        BodyScale calcn_r: axes=(X Y Z)
        BodyScale toes_r: axes=(X Y Z)
      Measurement foot_l: apply=true
        MarkerPair: markers=(LHEE LTOE)
        BodyScale talus_l: axes=(X Y Z)
        BodyScale calcn_l: axes=(X Y Z)
        BodyScale toes_l: axes=(X Y Z)
      Measurement pelvis_x: apply=true
        MarkerPair: markers=(LASI LPSI)
        MarkerPair: markers=(RASI RPSI)
        BodyScale pelvis: axes=X
      Measurement pelvis_y: apply=true
        MarkerPair: markers=(LASI LHJC)
        MarkerPair: markers=(RPSI RHJC)
        MarkerPair: markers=(LASI LHJC)
        MarkerPair: markers=(RASI RHJC)
        BodyScale pelvis: axes=Y
      Measurement pelvis_z: apply=true
        MarkerPair: markers=(RPSI LPSI)
        MarkerPair: markers=(RASI LASI)
        MarkerPair: markers=(RHJC LHJC)
        BodyScale pelvis: axes=Z
      Measurement torso_x: apply=true
        MarkerPair: markers=(STRN T10)
        BodyScale torso: axes=X
      Measurement torso_y: apply=true
        MarkerPair: markers=(LPSI RSHO)
        MarkerPair: markers=(RPSI RSHO)
        MarkerPair: markers=(LASI LSHO)
        MarkerPair: markers=(RASI RSHO)
        BodyScale torso: axes=Y
      Measurement torso_z: apply=true
        MarkerPair: markers=(RSHO LSHO)
        BodyScale torso: axes=Z
    ScaleSet:
      Scale: scales=(0.9 0.9 0.9) segment=pelvis apply=false
  MarkerPlacer:
    apply: true
    marker_file: ../experimental_data/static.trc
    time_range: 0 10
    output_motion_file: static.mot
    output_model_file: model_scaled.osim
    output_marker_file: model_markers.osim
    max_marker_movement: -1
    IKTaskSet:
      IKMarkerTask STRN: apply=true weight=1
      IKMarkerTask RSHO: apply=true weight=5
      IKMarkerTask LSHO: apply=true weight=5
      IKMarkerTask RASI: apply=true weight=1
      IKMarkerTask LASI: apply=true weight=1
      IKMarkerTask RTHI: apply=true weight=1
      IKMarkerTask RKNE: apply=true weight=2
      IKMarkerTask RTIB: apply=true weight=1
      IKMarkerTask RANK: apply=true weight=2
      IKMarkerTask RHEE: apply=true weight=1
      IKMarkerTask RTOE: apply=true weight=1
      IKMarkerTask LTHI: apply=true weight=1
      IKMarkerTask LKNE: apply=true weight=2
      IKMarkerTask LTIB: apply=true weight=1
      IKMarkerTask LANK: apply=true weight=2
      IKMarkerTask LHEE: apply=true weight=1
      IKMarkerTask LTOE: apply=true weight=1
      IKMarkerTask CLAV: apply=true weight=1
      IKMarkerTask C7: apply=true weight=1
      IKMarkerTask T10: apply=true weight=1
      IKMarkerTask RPSI: apply=true weight=1
      IKMarkerTask LPSI: apply=true weight=1
      IKMarkerTask RHJC: apply=true weight=6
      IKMarkerTask LHJC: apply=true weight=6
      IKMarkerTask RKJC: apply=true weight=6
      IKMarkerTask LKJC: apply=true weight=6
      IKMarkerTask RAJC: apply=true weight=6
      IKMarkerTask LAJC: apply=true weight=6
